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/BATCH
/COM,ANSYS RELEASE 2020 R1           BUILD 20.1      UP20191203       16:48:08
/input,menust,tmp,''
/GST,ON
/PLO,INFO,3
/GRO,CURL,ON
/CPLANE,1
WPSTYLE,,,,,,,,0
*SET,startVal , 3
*dim, c,, steps,9, 1 ! Example Matrix
*SET,enow , 0
*do, ct, 1, steps
*do, ct2, 1, 8
*SET,c(ct,ct2) , ct2%5
*SET,c(ct,9) , ct//startVal
*enddo
*enddo
!!! Writes out Matrix to matlab
*dmat, exportmatrix, D, import, APDL, c ! export to matrix file
*export, exportmatrix, mmf, mytemp.mtx
*SET,steps , 6
*SET,maxWStep , 12
*SET,n , 1
!*ask,startVal,Anfangswert,0
*SET,startVal , 3
*dim, c,, steps,9, 1 ! Example Matrix
*SET,enow , 0
*do, ct, 1, steps
*do, ct2, 1, 8
*SET,c(ct,ct2) , ct2%5
*SET,c(ct,9) , ct//startVal
*enddo
*enddo
!!! Writes out Matrix to matlab
*dmat, exportmatrix, D, import, APDL, c ! export to matrix file
*export, exportmatrix, mmf, mytemp.mtx
!========================================================
! Wandscheibe mit �ffnungen
! Einheiten: [kN],[m]
!========================================================
/nerr,0
*do,j,1,10,1
/com,
*enddo
/COM *** 5.2.2 ANSYS APDL ***
finish
/clear,start
/COM,ANSYS RELEASE 2020 R1           BUILD 20.1      UP20191203       17:01:43
/input,start,ans,'C:\Program Files\ANSYS Inc\v201\ANSYS\apdl\'
!-----------------
!Parameter
!-----------------
*SET,xStart , 0
*SET,yStart , 0
*SET,height , 8
*SET,width , 8
*SET,doorX , 1
*SET,doorY , 2
*SET,windW , 1.25
*SET,windH , 1.25
*SET,margin , 1
*SET,windMargin , 0.125
*SET,doorStep , 1
*SET,data , 0
*SET,meshsize , 0.125
*SET,verfein , 1
*SET,steps , 6
*SET,maxWStep , 12
*SET,n , 1
!*ask,startVal,Anfangswert,0
*SET,startVal , 3
*dim, c,, steps,9, 1 ! Example Matrix
*SET,enow , 0
*do, ct, 1, steps
*do, ct2, 1, 8
*SET,c(ct,ct2) , startVal
*enddo
*enddo
! *** loop to restart the calculation ***
!------------------------------------------------
*do,door,1,steps,1
*do w1, 1, maxWStep,1
*do w2, w1,maxWStep,1
*SET,n , n + 1
*SET,colW1 , w1%4
*SET,rowW1 , w1//4
*SET,colW2 , w2%4
*SET,rowW2 , w2//4
*SET,wind1X , margin + colW1*(2* windMargin + windW) + windMargin
*SET,wind1Y , height - margin - (rowW1+1)*(2*windMargin + windW) + windMargin
*SET,wind2X , margin + colW2*(2* windMargin + windW) + windMargin + 0.1
*SET,wind2Y , height - margin - (rowW2+1)*(2*windMargin + windW) + windMargin
!-----------------
!Initialize Iter
!-----------------
parsav,all
finish
/clear,start
/COM,ANSYS RELEASE 2020 R1           BUILD 20.1      UP20191203       17:01:45
/input,start,ans,'C:\Program Files\ANSYS Inc\v201\ANSYS\apdl\'
parres
/prep7
!-----------------
! Saving initial Param
!-----------------
*SET,c(n,1) , door
*SET,c(n,2) , wind1X
*SET,c(n,3) , wind1Y
*SET,c(n,4) , wind2X
*SET,c(n,5) , wind2Y
!-----------------
!Create House
!-----------------
BLC4,xStart, yStart, width, height !House
BLC4,door,yStart, doorX, doorY !Door
BLC4,wind1X,wind1Y,windW,windH !Window
BLC4,wind2X,wind2Y,windW,windH !2nd Window
!Selecting and deleting the area of Door and the two windows
FLST,3,3,5,ORDE,2
FITEM,3,2
FITEM,3,-4
ASBA,       1,P51X
!-----------------
! Material
!-----------------
ET,1,PLANE182
KEYOPT,1,1,0
KEYOPT,1,3,3
KEYOPT,1,6,0
r,1,0.2
mp,ex,1,30000000
mp,prxy,1,0.2
dl,17,,all
dl,18,,all
sfl,3,pres,250000000
!-----------------
! Mesh
!-----------------
esize,meshsize
amesh,all
cpintf,all
FINISH
/SOL
solve
FINISH
/POST1
!-----------------
! Value at point 4,4
!-----------------
!!!!!!!!!!!!!!!!!!!!!!!!!!!!!!!!!!
! T O   D O !!!!!!!!!!!!!!!!!!!!!!
!!!!!!!!!!!!!!!!!!!!!!!!!!!!!!!!!!
!Checken ob wir wirklich die Lösung bekommen die wir wollen
! maximale Verschiebung bei 4,4
allsel
nsel,s,loc,x,4 !select
nsel,r,loc,y,4 !reselect
*get,u,NODE,NDNEXT(0),u,y
*SET,c(n,6) , u
!
*enddo
*enddo
*enddo
!!! Writes out Matrix to matlab
*dmat, exportmatrix, D, import, APDL, c ! export to matrix file
*export, exportmatrix, mmf, mytemp.mtx
! *** exit the programm ***
!------------------------------------------------
finish
!/exit
!========================================================
! Wandscheibe mit �ffnungen
! Einheiten: [kN],[m]
!========================================================
/nerr,0
*do,j,1,10,1
/com,
*enddo
/COM *** 5.2.2 ANSYS APDL ***
finish
/clear,start
/COM,ANSYS RELEASE 2020 R1           BUILD 20.1      UP20191203       17:21:05
/input,start,ans,'C:\Program Files\ANSYS Inc\v201\ANSYS\apdl\'
!-----------------
!Parameter
!-----------------
*SET,xStart , 0
*SET,yStart , 0
*SET,height , 8
*SET,width , 8
*SET,doorX , 1
*SET,doorY , 2
*SET,windW , 1.25
*SET,windH , 1.25
*SET,margin , 1
*SET,windMargin , 0.125
*SET,doorStep , 1
*SET,data , 0
*SET,meshsize , 0.125
*SET,verfein , 1
*SET,steps , 6
*SET,maxWStep , 12
*SET,n , 0
!*ask,startVal,Anfangswert,0
*SET,startVal , 3
*dim, c,, steps,9, 1 ! Example Matrix
*SET,enow , 0
*do, ct, 1, steps
*do, ct2, 1, 8
*SET,c(ct,ct2) , startVal
*enddo
*enddo
! *** loop to restart the calculation ***
!------------------------------------------------
*do,door,1,steps,1
*do w1, 1, maxWStep,1
*do w2, w1,maxWStep,1
*SET,n , n + 1
*SET,colW1 , MOD(w1,4)
*SET,rowW1 , (w1 - colW1)/4
*SET,colW2 , MOD(w2,4)
*SET,rowW2 , (w2 - colW2)/4
*SET,wind1X , margin + colW1*(2* windMargin + windW) + windMargin
*SET,wind1Y , height - margin - (rowW1+1)*(2*windMargin + windW) + windMargin
*SET,wind2X , margin + colW2*(2* windMargin + windW) + windMargin
*SET,wind2Y , height - margin - (rowW2+1)*(2*windMargin + windW) + windMargin
!-----------------
!Initialize Iter
!-----------------
parsav,all
finish
/clear,start
/COM,ANSYS RELEASE 2020 R1           BUILD 20.1      UP20191203       17:21:07
/input,start,ans,'C:\Program Files\ANSYS Inc\v201\ANSYS\apdl\'
parres
/prep7
!-----------------
! Saving initial Param
!-----------------
*SET,c(n,1) , door
*SET,c(n,2) , wind1X
*SET,c(n,3) , wind1Y
*SET,c(n,4) , wind2X
*SET,c(n,5) , wind2Y
!-----------------
!Create House
!-----------------
BLC4,xStart, yStart, width, height !House
BLC4,door,yStart, doorX, doorY !Door
BLC4,wind1X,wind1Y,windW,windH !Window
BLC4,wind2X,wind2Y,windW,windH !2nd Window
!Selecting and deleting the area of Door and the two windows
FLST,3,3,5,ORDE,2
FITEM,3,2
FITEM,3,-4
ASBA,       1,P51X
!-----------------
! Material
!-----------------
ET,1,PLANE182
KEYOPT,1,1,0
KEYOPT,1,3,3
KEYOPT,1,6,0
r,1,0.2
mp,ex,1,30000000
mp,prxy,1,0.2
dl,17,,all
dl,18,,all
sfl,3,pres,250000000
!-----------------
! Mesh
!-----------------
esize,meshsize
amesh,all
cpintf,all
FINISH
/SOL
solve
FINISH
/POST1
!-----------------
! Value at point 4,4
!-----------------
!!!!!!!!!!!!!!!!!!!!!!!!!!!!!!!!!!
! T O   D O !!!!!!!!!!!!!!!!!!!!!!
!!!!!!!!!!!!!!!!!!!!!!!!!!!!!!!!!!
!Checken ob wir wirklich die Lösung bekommen die wir wollen
! maximale Verschiebung bei 4,4
allsel
nsel,s,loc,x,4 !select
nsel,r,loc,y,4 !reselect
*get,u,NODE,NDNEXT(0),u,y
*SET,c(n,6) , u
!
*enddo
*enddo
*enddo
!!! Writes out Matrix to matlab
*dmat, exportmatrix, D, import, APDL, c ! export to matrix file
*export, exportmatrix, mmf, mytemp.mtx
! *** exit the programm ***
!------------------------------------------------
finish
!/exit
/POST1
/SHOW,WIN32C
SET,FIRST
/PLOPTS,INFO,3
/CONTOUR,ALL,18
/NUMBER,1
PLNSOL,U,X
! /UIS,ABORT,1
/SHOW,WIN32
/SHOW,WIN32C
SET,FIRST
/PLOPTS,INFO,3
/NUMBER,1
PLDISP,1
ANDSCL,10,0.5
! /UIS,ABORT,1
/SHOW,WIN32
!========================================================
! Wandscheibe mit �ffnungen
! Einheiten: [kN],[m]
!========================================================
/nerr,0
*do,j,1,10,1
/com,
*enddo
/COM *** 5.2.2 ANSYS APDL ***
finish
/clear,start
/COM,ANSYS RELEASE 2020 R1           BUILD 20.1      UP20191203       17:28:04
/input,start,ans,'C:\Program Files\ANSYS Inc\v201\ANSYS\apdl\'
!-----------------
!Parameter
!-----------------
*SET,xStart , 0
*SET,yStart , 0
*SET,height , 8
*SET,width , 8
*SET,doorX , 1
*SET,doorY , 2
*SET,windW , 1.25
*SET,windH , 1.25
*SET,margin , 1
*SET,windMargin , 0.125
*SET,doorStep , 1
*SET,data , 0
*SET,meshsize , 0.125
*SET,verfein , 1
*SET,steps , 6
*SET,maxWStep , 12
*SET,n , 0
!*ask,startVal,Anfangswert,0
*SET,startVal , 3
*dim, c,, steps,9, 1 ! Example Matrix
*SET,enow , 0
*do, ct, 1, steps
*do, ct2, 1, 8
*SET,c(ct,ct2) , startVal
*enddo
*enddo
! *** loop to restart the calculation ***
!------------------------------------------------
*do,door,1,steps,1
*do w1, 1, maxWStep,1
*do w2, w1,maxWStep,1
*SET,n , n + 1
*SET,colW1 , w1 - 1
*SET,rowW1 , (w1 - 1)/4
*SET,colW2 , w2 - 1
*SET,rowW2 , (w2 - 1)/4
!colW1 = MOD(w1,4)
!rowW1 = (w1 - colW1)/4
!colW2 = MOD(w2,4)
!rowW2 = (w2 - colW2)/4
*SET,wind1X , margin + colW1*(2* windMargin + windW) + windMargin
*SET,wind1Y , height - margin - (rowW1+1)*(2*windMargin + windW) + windMargin
*SET,wind2X , margin + colW2*(2* windMargin + windW) + windMargin
*SET,wind2Y , height - margin - (rowW2+1)*(2*windMargin + windW) + windMargin
!-----------------
!Initialize Iter
!-----------------
parsav,all
finish
/clear,start
/COM,ANSYS RELEASE 2020 R1           BUILD 20.1      UP20191203       17:28:06
/input,start,ans,'C:\Program Files\ANSYS Inc\v201\ANSYS\apdl\'
parres
/prep7
!-----------------
! Saving initial Param
!-----------------
*SET,c(n,1) , door
*SET,c(n,2) , wind1X
*SET,c(n,3) , wind1Y
*SET,c(n,4) , wind2X
*SET,c(n,5) , wind2Y
!-----------------
!Create House
!-----------------
BLC4,xStart, yStart, width, height !House
BLC4,door,yStart, doorX, doorY !Door
BLC4,wind1X,wind1Y,windW,windH !Window
BLC4,wind2X,wind2Y,windW,windH !2nd Window
!Selecting and deleting the area of Door and the two windows
FLST,3,3,5,ORDE,2
FITEM,3,2
FITEM,3,-4
ASBA,       1,P51X
!-----------------
! Material
!-----------------
ET,1,PLANE182
KEYOPT,1,1,0
KEYOPT,1,3,3
KEYOPT,1,6,0
r,1,0.2
mp,ex,1,30000000
mp,prxy,1,0.2
dl,17,,all
dl,18,,all
sfl,3,pres,250000000
!-----------------
! Mesh
!-----------------
esize,meshsize
amesh,all
cpintf,all
FINISH
/SOL
solve
FINISH
/POST1
!-----------------
! Value at point 4,4
!-----------------
!!!!!!!!!!!!!!!!!!!!!!!!!!!!!!!!!!
! T O   D O !!!!!!!!!!!!!!!!!!!!!!
!!!!!!!!!!!!!!!!!!!!!!!!!!!!!!!!!!
!Checken ob wir wirklich die Lösung bekommen die wir wollen
! maximale Verschiebung bei 4,4
allsel
nsel,s,loc,x,4 !select
nsel,r,loc,y,4 !reselect
*get,u,NODE,NDNEXT(0),u,y
*SET,c(n,6) , u
!
*enddo
*enddo
*enddo
!!! Writes out Matrix to matlab
*dmat, exportmatrix, D, import, APDL, c ! export to matrix file
*export, exportmatrix, mmf, mytemp.mtx
! *** exit the programm ***
!------------------------------------------------
finish
!/exit
!========================================================
! Wandscheibe mit �ffnungen
! Einheiten: [kN],[m]
!========================================================
/nerr,0
*do,j,1,10,1
/com,
*enddo
/COM *** 5.2.2 ANSYS APDL ***
finish
/clear,start
/COM,ANSYS RELEASE 2020 R1           BUILD 20.1      UP20191203       17:29:40
/input,start,ans,'C:\Program Files\ANSYS Inc\v201\ANSYS\apdl\'
!-----------------
!Parameter
!-----------------
*SET,xStart , 0
*SET,yStart , 0
*SET,height , 8
*SET,width , 8
*SET,doorX , 1
*SET,doorY , 2
*SET,windW , 1.25
*SET,windH , 1.25
*SET,margin , 1
*SET,windMargin , 0.125
*SET,doorStep , 1
*SET,data , 0
*SET,meshsize , 0.125
*SET,verfein , 1
*SET,steps , 6
*SET,maxWStep , 12
*SET,n , 0
!*ask,startVal,Anfangswert,0
*SET,startVal , 3
*dim, c,, steps,9, 1 ! Example Matrix
*SET,enow , 0
*do, ct, 1, steps
*do, ct2, 1, 8
*SET,c(ct,ct2) , startVal
*enddo
*enddo
! *** loop to restart the calculation ***
!------------------------------------------------
*do,door,1,steps,1
*do w1, 1, maxWStep,1
*do w2, w1,maxWStep,1
*SET,n , n + 1
!-----------------
!Initialize Iter
!-----------------
parsav,all
finish
/clear,start
/COM,ANSYS RELEASE 2020 R1           BUILD 20.1      UP20191203       17:29:43
/input,start,ans,'C:\Program Files\ANSYS Inc\v201\ANSYS\apdl\'
parres
*SET,colW1 , w1 - 1
*SET,rowW1 , (w1 - 1)/4
*SET,colW2 , w2 - 1
*SET,rowW2 , (w2 - 1)/4
!colW1 = MOD(w1,4)
!rowW1 = (w1 - colW1)/4
!colW2 = MOD(w2,4)
!rowW2 = (w2 - colW2)/4
*SET,wind1X , margin + colW1*(2* windMargin + windW) + windMargin
*SET,wind1Y , height - margin - (rowW1+1)*(2*windMargin + windW) + windMargin
*SET,wind2X , margin + colW2*(2* windMargin + windW) + windMargin
*SET,wind2Y , height - margin - (rowW2+1)*(2*windMargin + windW) + windMargin
/prep7
!-----------------
! Saving initial Param
!-----------------
*SET,c(n,1) , door
*SET,c(n,2) , wind1X
*SET,c(n,3) , wind1Y
*SET,c(n,4) , wind2X
*SET,c(n,5) , wind2Y
!-----------------
!Create House
!-----------------
BLC4,xStart, yStart, width, height !House
BLC4,door,yStart, doorX, doorY !Door
BLC4,wind1X,wind1Y,windW,windH !Window
BLC4,wind2X,wind2Y,windW,windH !2nd Window
!Selecting and deleting the area of Door and the two windows
FLST,3,3,5,ORDE,2
FITEM,3,2
FITEM,3,-4
ASBA,       1,P51X
!-----------------
! Material
!-----------------
ET,1,PLANE182
KEYOPT,1,1,0
KEYOPT,1,3,3
KEYOPT,1,6,0
r,1,0.2
mp,ex,1,30000000
mp,prxy,1,0.2
dl,17,,all
dl,18,,all
sfl,3,pres,250000000
!-----------------
! Mesh
!-----------------
esize,meshsize
amesh,all
cpintf,all
FINISH
/SOL
solve
FINISH
/POST1
!-----------------
! Value at point 4,4
!-----------------
!!!!!!!!!!!!!!!!!!!!!!!!!!!!!!!!!!
! T O   D O !!!!!!!!!!!!!!!!!!!!!!
!!!!!!!!!!!!!!!!!!!!!!!!!!!!!!!!!!
!Checken ob wir wirklich die Lösung bekommen die wir wollen
! maximale Verschiebung bei 4,4
allsel
nsel,s,loc,x,4 !select
nsel,r,loc,y,4 !reselect
*get,u,NODE,NDNEXT(0),u,y
*SET,c(n,6) , u
!
*enddo
*enddo
*enddo
!!! Writes out Matrix to matlab
*dmat, exportmatrix, D, import, APDL, c ! export to matrix file
*export, exportmatrix, mmf, mytemp.mtx
! *** exit the programm ***
!------------------------------------------------
finish
!/exit
!========================================================
! Wandscheibe mit �ffnungen
! Einheiten: [kN],[m]
!========================================================
/nerr,0
*do,j,1,10,1
/com,
*enddo
/COM *** 5.2.2 ANSYS APDL ***
finish
/clear,start
/COM,ANSYS RELEASE 2020 R1           BUILD 20.1      UP20191203       17:30:01
/input,start,ans,'C:\Program Files\ANSYS Inc\v201\ANSYS\apdl\'
!-----------------
!Parameter
!-----------------
*SET,xStart , 0
*SET,yStart , 0
*SET,height , 8
*SET,width , 8
*SET,doorX , 1
*SET,doorY , 2
*SET,windW , 1.25
*SET,windH , 1.25
*SET,margin , 1
*SET,windMargin , 0.125
*SET,doorStep , 1
*SET,data , 0
*SET,meshsize , 0.125
*SET,verfein , 1
*SET,steps , 6
*SET,maxWStep , 12
*SET,n , 0
!*ask,startVal,Anfangswert,0
*SET,startVal , 3
*dim, c,, steps,9, 1 ! Example Matrix
*SET,enow , 0
*do, ct, 1, steps
*do, ct2, 1, 8
*SET,c(ct,ct2) , startVal
*enddo
*enddo
! *** loop to restart the calculation ***
!------------------------------------------------
*do,door,1,steps,1
*do w1, 1, maxWStep,1
*do w2, w1,maxWStep,1
*SET,n , n + 1
!-----------------
!Initialize Iter
!-----------------
parsav,all
finish
/clear,start
/COM,ANSYS RELEASE 2020 R1           BUILD 20.1      UP20191203       17:30:04
/input,start,ans,'C:\Program Files\ANSYS Inc\v201\ANSYS\apdl\'
parres
*SET,colW1 , w1 - 1
*SET,rowW1 , (w1 - 1)/4
*SET,colW2 , w2 - 1
*SET,rowW2 , (w2 - 1)/4
!colW1 = MOD(w1,4)
!rowW1 = (w1 - colW1)/4
!colW2 = MOD(w2,4)
!rowW2 = (w2 - colW2)/4
*SET,wind1X , margin + colW1*(2* windMargin + windW) + windMargin
*SET,wind1Y , height - margin - (rowW1+1)*(2*windMargin + windW) + windMargin
*SET,wind2X , margin + colW2*(2* windMargin + windW) + windMargin
*SET,wind2Y , height - margin - (rowW2+1)*(2*windMargin + windW) + windMargin
/prep7
!-----------------
! Saving initial Param
!-----------------
*SET,c(n,1) , door
*SET,c(n,2) , wind1X
*SET,c(n,3) , wind1Y
*SET,c(n,4) , wind2X
*SET,c(n,5) , wind2Y
!-----------------
!Create House
!-----------------
BLC4,xStart, yStart, width, height !House
BLC4,door,yStart, doorX, doorY !Door
BLC4,wind1X,wind1Y,windW,windH !Window
BLC4,wind2X,wind2Y,windW,windH !2nd Window
!Selecting and deleting the area of Door and the two windows
FLST,3,3,5,ORDE,2
FITEM,3,2
FITEM,3,-4
ASBA,       1,P51X
!-----------------
! Material
!-----------------
ET,1,PLANE182
KEYOPT,1,1,0
KEYOPT,1,3,3
KEYOPT,1,6,0
r,1,0.2
mp,ex,1,30000000
mp,prxy,1,0.2
dl,17,,all
dl,18,,all
sfl,3,pres,250000000
!-----------------
! Mesh
!-----------------
esize,meshsize
amesh,all
cpintf,all
FINISH
/SOL
solve
FINISH
/POST1
!-----------------
! Value at point 4,4
!-----------------
!!!!!!!!!!!!!!!!!!!!!!!!!!!!!!!!!!
! T O   D O !!!!!!!!!!!!!!!!!!!!!!
!!!!!!!!!!!!!!!!!!!!!!!!!!!!!!!!!!
!Checken ob wir wirklich die Lösung bekommen die wir wollen
! maximale Verschiebung bei 4,4
allsel
nsel,s,loc,x,4 !select
nsel,r,loc,y,4 !reselect
*get,u,NODE,NDNEXT(0),u,y
*SET,c(n,6) , u
!
*enddo
*enddo
*enddo
!!! Writes out Matrix to matlab
*dmat, exportmatrix, D, import, APDL, c ! export to matrix file
*export, exportmatrix, mmf, mytemp.mtx
! *** exit the programm ***
!------------------------------------------------
finish
!/exit
!========================================================
! Wandscheibe mit �ffnungen
! Einheiten: [kN],[m]
!========================================================
/nerr,0
*do,j,1,10,1
/com,
*enddo
/COM *** 5.2.2 ANSYS APDL ***
finish
/clear,start
/COM,ANSYS RELEASE 2020 R1           BUILD 20.1      UP20191203       17:34:17
/input,start,ans,'C:\Program Files\ANSYS Inc\v201\ANSYS\apdl\'
!-----------------
!Parameter
!-----------------
*SET,xStart , 0
*SET,yStart , 0
*SET,height , 8
*SET,width , 8
*SET,doorX , 1
*SET,doorY , 2
*SET,windW , 1.25
*SET,windH , 1.25
*SET,margin , 1
*SET,windMargin , 0.125
*SET,doorStep , 1
*SET,data , 0
*SET,meshsize , 0.125
*SET,verfein , 1
*SET,steps , 6
*SET,maxWStep , 12
*SET,n , 0
!*ask,startVal,Anfangswert,0
*SET,startVal , 3
*dim, c,, steps,9, 1 ! Example Matrix
*SET,enow , 0
*do, ct, 1, steps
*do, ct2, 1, 8
*SET,c(ct,ct2) , startVal
*enddo
*enddo
! *** loop to restart the calculation ***
!------------------------------------------------
*do,door,1,steps,1
!*do w1, 1, maxWStep,1
!*do w2, 1,maxWStep,1
*SET,n , n + 1
*SET,w1 , 3
*SET,w2 , 8
!-----------------
!Initialize Iter
!-----------------
parsav,all
finish
/clear,start
/COM,ANSYS RELEASE 2020 R1           BUILD 20.1      UP20191203       17:34:21
/input,start,ans,'C:\Program Files\ANSYS Inc\v201\ANSYS\apdl\'
parres
*SET,colW1 , w1 - 1
*SET,rowW1 , (w1 - 1)/4
*SET,colW2 , w2 - 1
*SET,rowW2 , (w2 - 1)/4
!colW1 = MOD(w1,4)
!rowW1 = (w1 - colW1)/4
!colW2 = MOD(w2,4)
!rowW2 = (w2 - colW2)/4
*SET,wind1X , margin + colW1*(2* windMargin + windW) + windMargin
*SET,wind1Y , height - margin - (rowW1+1)*(2*windMargin + windW) + windMargin
*SET,wind2X , margin + colW2*(2* windMargin + windW) + windMargin
*SET,wind2Y , height - margin - (rowW2+1)*(2*windMargin + windW) + windMargin
/prep7
!-----------------
! Saving initial Param
!-----------------
*SET,c(n,1) , door
*SET,c(n,2) , wind1X
*SET,c(n,3) , wind1Y
*SET,c(n,4) , wind2X
*SET,c(n,5) , wind2Y
!-----------------
!Create House
!-----------------
BLC4,xStart, yStart, width, height !House
BLC4,door,yStart, doorX, doorY !Door
BLC4,wind1X,wind1Y,windW,windH !Window
BLC4,wind2X,wind2Y,windW,windH !2nd Window
!Selecting and deleting the area of Door and the two windows
FLST,3,3,5,ORDE,2
FITEM,3,2
FITEM,3,-4
ASBA,       1,P51X
!-----------------
! Material
!-----------------
ET,1,PLANE182
KEYOPT,1,1,0
KEYOPT,1,3,3
KEYOPT,1,6,0
r,1,0.2
mp,ex,1,30000000
mp,prxy,1,0.2
dl,17,,all
dl,18,,all
sfl,3,pres,250000000
!-----------------
! Mesh
!-----------------
esize,meshsize
amesh,all
cpintf,all
FINISH
/SOL
solve
FINISH
/POST1
!-----------------
! Value at point 4,4
!-----------------
!!!!!!!!!!!!!!!!!!!!!!!!!!!!!!!!!!
! T O   D O !!!!!!!!!!!!!!!!!!!!!!
!!!!!!!!!!!!!!!!!!!!!!!!!!!!!!!!!!
!Checken ob wir wirklich die Lösung bekommen die wir wollen
! maximale Verschiebung bei 4,4
allsel
nsel,s,loc,x,4 !select
nsel,r,loc,y,4 !reselect
*get,u,NODE,NDNEXT(0),u,y
*SET,c(n,6) , u
!
!*enddo
!*enddo
*enddo
/COM,ANSYS RELEASE 2020 R1           BUILD 20.1      UP20191203       17:34:36
!!! Writes out Matrix to matlab
*dmat, exportmatrix, D, import, APDL, c ! export to matrix file
*export, exportmatrix, mmf, mytemp.mtx
! *** exit the programm ***
!------------------------------------------------
finish
!/exit
!========================================================
! Wandscheibe mit �ffnungen
! Einheiten: [kN],[m]
!========================================================
/nerr,0
*do,j,1,10,1
/com,
*enddo
/COM *** 5.2.2 ANSYS APDL ***
finish
/clear,start
/COM,ANSYS RELEASE 2020 R1           BUILD 20.1      UP20191203       17:35:15
/input,start,ans,'C:\Program Files\ANSYS Inc\v201\ANSYS\apdl\'
!-----------------
!Parameter
!-----------------
*SET,xStart , 0
*SET,yStart , 0
*SET,height , 8
*SET,width , 8
*SET,doorX , 1
*SET,doorY , 2
*SET,windW , 1.25
*SET,windH , 1.25
*SET,margin , 1
*SET,windMargin , 0.125
*SET,doorStep , 1
*SET,data , 0
*SET,meshsize , 0.125
*SET,verfein , 1
*SET,steps , 6
*SET,maxWStep , 12
*SET,n , 0
!*ask,startVal,Anfangswert,0
*SET,startVal , 3
*dim, c,, steps,9, 1 ! Example Matrix
*SET,enow , 0
*do, ct, 1, steps
*do, ct2, 1, 8
*SET,c(ct,ct2) , startVal
*enddo
*enddo
! *** loop to restart the calculation ***
!------------------------------------------------
*do,door,1,steps,1
!*do w1, 1, maxWStep,1
!*do w2, 1,maxWStep,1
*SET,n , n + 1
*SET,w1 , 3
*SET,w2 , 8
!-----------------
!Initialize Iter
!-----------------
parsav,all
finish
/clear,start
/COM,ANSYS RELEASE 2020 R1           BUILD 20.1      UP20191203       17:35:21
/input,start,ans,'C:\Program Files\ANSYS Inc\v201\ANSYS\apdl\'
parres
*SET,colW1 , w1 - 1
*SET,rowW1 , (w1 - 1)/4
*SET,colW2 , w2 - 1
*SET,rowW2 , (w2 - 1)/4
!colW1 = MOD(w1,4)
!rowW1 = (w1 - colW1)/4
!colW2 = MOD(w2,4)
!rowW2 = (w2 - colW2)/4
*SET,wind1X , margin + colW1*(2* windMargin + windW) + windMargin
*SET,wind1Y , height - margin - (rowW1+1)*(2*windMargin + windW) + windMargin
*SET,wind2X , margin + colW2*(2* windMargin + windW) + windMargin
*SET,wind2Y , height - margin - (rowW2+1)*(2*windMargin + windW) + windMargin
/prep7
!-----------------
! Saving initial Param
!-----------------
*SET,c(n,1) , door
*SET,c(n,2) , wind1X
*SET,c(n,3) , wind1Y
*SET,c(n,4) , wind2X
*SET,c(n,5) , wind2Y
!-----------------
!Create House
!-----------------
BLC4,xStart, yStart, width, height !House
BLC4,door,yStart, doorX, doorY !Door
BLC4,wind1X,wind1Y,windW,windH !Window
BLC4,wind2X,wind2Y,windW,windH !2nd Window
!Selecting and deleting the area of Door and the two windows
FLST,3,3,5,ORDE,2
FITEM,3,2
FITEM,3,-4
ASBA,       1,P51X
!-----------------
! Material
!-----------------
ET,1,PLANE182
KEYOPT,1,1,0
KEYOPT,1,3,3
KEYOPT,1,6,0
r,1,0.2
mp,ex,1,30000000
mp,prxy,1,0.2
dl,17,,all
dl,18,,all
sfl,3,pres,250000000
!-----------------
! Mesh
!-----------------
esize,meshsize
amesh,all
cpintf,all
FINISH
/SOL
solve
FINISH
/POST1
!-----------------
! Value at point 4,4
!-----------------
!!!!!!!!!!!!!!!!!!!!!!!!!!!!!!!!!!
! T O   D O !!!!!!!!!!!!!!!!!!!!!!
!!!!!!!!!!!!!!!!!!!!!!!!!!!!!!!!!!
!Checken ob wir wirklich die Lösung bekommen die wir wollen
! maximale Verschiebung bei 4,4
allsel
nsel,s,loc,x,4 !select
nsel,r,loc,y,4 !reselect
*get,u,NODE,NDNEXT(0),u,y
*SET,c(n,6) , u
!
!*enddo
!*enddo
*enddo
/COM,ANSYS RELEASE 2020 R1           BUILD 20.1      UP20191203       17:35:37
!!! Writes out Matrix to matlab
*dmat, exportmatrix, D, import, APDL, c ! export to matrix file
*export, exportmatrix, mmf, mytemp.mtx
! *** exit the programm ***
!------------------------------------------------
finish
!/exit
!========================================================
! Wandscheibe mit �ffnungen
! Einheiten: [kN],[m]
!========================================================
/nerr,0
*do,j,1,10,1
/com,
*enddo
/COM *** 5.2.2 ANSYS APDL ***
finish
/clear,start
/COM,ANSYS RELEASE 2020 R1           BUILD 20.1      UP20191203       17:36:38
/input,start,ans,'C:\Program Files\ANSYS Inc\v201\ANSYS\apdl\'
!-----------------
!Parameter
!-----------------
*SET,xStart , 0
*SET,yStart , 0
*SET,height , 8
*SET,width , 8
*SET,doorX , 1
*SET,doorY , 2
*SET,windW , 1.25
*SET,windH , 1.25
*SET,margin , 1
*SET,windMargin , 0.125
*SET,doorStep , 1
*SET,data , 0
*SET,meshsize , 0.125
*SET,verfein , 1
*SET,steps , 6
*SET,maxWStep , 12
*SET,n , 0
!*ask,startVal,Anfangswert,0
*SET,startVal , 3
*dim, c,, steps,9, 1 ! Example Matrix
*SET,enow , 0
*do, ct, 1, steps
*do, ct2, 1, 8
*SET,c(ct,ct2) , startVal
*enddo
*enddo
! *** loop to restart the calculation ***
!------------------------------------------------
*do,door,1,steps,1
!*do w1, 1, maxWStep,1
!*do w2, 1,maxWStep,1
*SET,n , n + 1
*SET,w1 , 1
*SET,w2 , 3
!-----------------
!Initialize Iter
!-----------------
parsav,all
finish
/clear,start
/COM,ANSYS RELEASE 2020 R1           BUILD 20.1      UP20191203       17:36:41
/input,start,ans,'C:\Program Files\ANSYS Inc\v201\ANSYS\apdl\'
parres
*SET,colW1 , w1 - 1
*SET,rowW1 , (w1 - 1)/4
*SET,colW2 , w2 - 1
*SET,rowW2 , (w2 - 1)/4
!colW1 = MOD(w1,4)
!rowW1 = (w1 - colW1)/4
!colW2 = MOD(w2,4)
!rowW2 = (w2 - colW2)/4
*SET,wind1X , margin + colW1*(2* windMargin + windW) + windMargin
*SET,wind1Y , height - margin - (rowW1+1)*(2*windMargin + windW) + windMargin
*SET,wind2X , margin + colW2*(2* windMargin + windW) + windMargin
*SET,wind2Y , height - margin - (rowW2+1)*(2*windMargin + windW) + windMargin
/prep7
!-----------------
! Saving initial Param
!-----------------
*SET,c(n,1) , door
*SET,c(n,2) , wind1X
*SET,c(n,3) , wind1Y
*SET,c(n,4) , wind2X
*SET,c(n,5) , wind2Y
!-----------------
!Create House
!-----------------
BLC4,xStart, yStart, width, height !House
BLC4,door,yStart, doorX, doorY !Door
BLC4,wind1X,wind1Y,windW,windH !Window
BLC4,wind2X,wind2Y,windW,windH !2nd Window
!Selecting and deleting the area of Door and the two windows
FLST,3,3,5,ORDE,2
FITEM,3,2
FITEM,3,-4
ASBA,       1,P51X
!-----------------
! Material
!-----------------
ET,1,PLANE182
KEYOPT,1,1,0
KEYOPT,1,3,3
KEYOPT,1,6,0
r,1,0.2
mp,ex,1,30000000
mp,prxy,1,0.2
dl,17,,all
dl,18,,all
sfl,3,pres,250000000
!-----------------
! Mesh
!-----------------
esize,meshsize
amesh,all
cpintf,all
FINISH
/SOL
solve
FINISH
/POST1
!-----------------
! Value at point 4,4
!-----------------
!!!!!!!!!!!!!!!!!!!!!!!!!!!!!!!!!!
! T O   D O !!!!!!!!!!!!!!!!!!!!!!
!!!!!!!!!!!!!!!!!!!!!!!!!!!!!!!!!!
!Checken ob wir wirklich die Lösung bekommen die wir wollen
! maximale Verschiebung bei 4,4
allsel
nsel,s,loc,x,4 !select
nsel,r,loc,y,4 !reselect
*get,u,NODE,NDNEXT(0),u,y
*SET,c(n,6) , u
!
!*enddo
!*enddo
*enddo
/COM,ANSYS RELEASE 2020 R1           BUILD 20.1      UP20191203       17:36:57
!!! Writes out Matrix to matlab
*dmat, exportmatrix, D, import, APDL, c ! export to matrix file
*export, exportmatrix, mmf, mytemp.mtx
! *** exit the programm ***
!------------------------------------------------
finish
!/exit
!========================================================
! Wandscheibe mit �ffnungen
! Einheiten: [kN],[m]
!========================================================
/nerr,0
*do,j,1,10,1
/com,
*enddo
/COM *** 5.2.2 ANSYS APDL ***
finish
/clear,start
/COM,ANSYS RELEASE 2020 R1           BUILD 20.1      UP20191203       17:45:21
/input,start,ans,'C:\Program Files\ANSYS Inc\v201\ANSYS\apdl\'
!-----------------
!Parameter
!-----------------
*SET,xStart , 0
*SET,yStart , 0
*SET,height , 8
*SET,width , 8
*SET,doorX , 1
*SET,doorY , 2
*SET,windW , 1.25
*SET,windH , 1.25
*SET,margin , 1
*SET,windMargin , 0.125
*SET,doorStep , 1
*SET,data , 0
*SET,meshsize , 0.5
*SET,verfein , 1
*SET,steps , 6
*SET,maxWStep , 12
*SET,n , 0
!*ask,startVal,Anfangswert,0
*SET,startVal , 3
*dim, c,, steps,9, 1 ! Example Matrix
*SET,enow , 0
*do, ct, 1, steps
*do, ct2, 1, 8
*SET,c(ct,ct2) , startVal
*enddo
*enddo
! *** loop to restart the calculation ***
!------------------------------------------------
*do,door,1,steps,1
*do w1, 1, maxWStep,1
!*do w2, 1,maxWStep,1
*SET,n , n + 1
*SET,w1 , 1
*SET,w2 , 3
!-----------------
!Initialize Iter
!-----------------
parsav,all
finish
/clear,start
/COM,ANSYS RELEASE 2020 R1           BUILD 20.1      UP20191203       17:45:24
/input,start,ans,'C:\Program Files\ANSYS Inc\v201\ANSYS\apdl\'
parres
*SET,colW1 , w1 - 1
*SET,rowW1 , (w1 - 1)/4
*SET,colW2 , w2 - 1
*SET,rowW2 , (w2 - 1)/4
!colW1 = MOD(w1,4)
!rowW1 = (w1 - colW1)/4
!colW2 = MOD(w2,4)
!rowW2 = (w2 - colW2)/4
*SET,wind1X , margin + colW1*(2* windMargin + windW) + windMargin
*SET,wind1Y , height - margin - (rowW1+1)*(2*windMargin + windW) + windMargin
*SET,wind2X , margin + colW2*(2* windMargin + windW) + windMargin
*SET,wind2Y , height - margin - (rowW2+1)*(2*windMargin + windW) + windMargin
/prep7
!-----------------
! Saving initial Param
!-----------------
*SET,c(n,1) , door
*SET,c(n,2) , wind1X
*SET,c(n,3) , wind1Y
*SET,c(n,4) , wind2X
*SET,c(n,5) , wind2Y
!-----------------
!Create House
!-----------------
BLC4,xStart, yStart, width, height !House
BLC4,door,yStart, doorX, doorY !Door
BLC4,wind1X,wind1Y,windW,windH !Window
BLC4,wind2X,wind2Y,windW,windH !2nd Window
!Selecting and deleting the area of Door and the two windows
FLST,3,3,5,ORDE,2
FITEM,3,2
FITEM,3,-4
ASBA,       1,P51X
!-----------------
! Material
!-----------------
ET,1,PLANE182
KEYOPT,1,1,0
KEYOPT,1,3,3
KEYOPT,1,6,0
r,1,0.2
mp,ex,1,30000000
mp,prxy,1,0.2
dl,17,,all
dl,18,,all
sfl,3,pres,250000000
!-----------------
! Mesh
!-----------------
esize,meshsize
amesh,all
cpintf,all
FINISH
/SOL
solve
