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/BATCH
/COM,ANSYS RELEASE 2020 R1           BUILD 20.1      UP20191203       14:03:06
/input,menust,tmp,''
/GST,ON
/PLO,INFO,3
/GRO,CURL,ON
/CPLANE,1
WPSTYLE,,,,,,,,0
!=======================================================
!/exit
!========================================================
! Wandscheibe mit �ffnungen
! Einheiten: [kN],[m]
!========================================================
/nerr,0
*do,j,1,10,1
/com,
*enddo
/COM *** 5.2.2 ANSYS APDL ***
finish
/clear,start
/COM,ANSYS RELEASE 2020 R1           BUILD 20.1      UP20191203       14:06:49
/input,start,ans,'C:\Program Files\ANSYS Inc\v201\ANSYS\apdl\'
meshsize=0.5
verfein=2
steps=3
*DIM,results,TABLE,steps,6
*TAXIS,results(1,1),1,1.,2.,3.,4.,5.,6.,7.,8.,9.,10.,
*TAXIS,results(1,1),2,1.,2.,3.,4.,5.,6.
*dim, c,, steps,10, 1 ! Example Matrix
*SET,enow , 0
*do, ct, 1, 10
*do, ct2, 1, 10
*SET,c(ct,ct2) , ct*ct2
*enddo
*enddo
!!! Writes out Matrix to matlab
*dmat, exportmatrix, D, import, APDL, c ! export to matrix file
*export, exportmatrix, mmf, mytemp.mtx
! *** loop to restart the calculation ***
!------------------------------------------------
*do,j,1,steps,1
/com,  %j%  %meshsize%
*SET,results(j,1) , meshsize
parsav,all
finish
/clear,start
/COM,ANSYS RELEASE 2020 R1           BUILD 20.1      UP20191203       14:07:03
/input,start,ans,'C:\Program Files\ANSYS Inc\v201\ANSYS\apdl\'
parres
/prep7
blc4,0,0,10,10
blc4,5,0,5,5
asba,1,2
ET,1,PLANE182
KEYOPT,1,1,0
KEYOPT,1,3,3
KEYOPT,1,6,0
r,1,0.2
mp,ex,1,30000000
mp,prxy,1,0.2
dl,9,,all
sfl,3,pres,250
esize,meshsize
amesh,all
cpintf,all
FINISH
/SOL
solve
FINISH
/POST1
! maximale Verschiebung bei 10;10
allsel
nsel,s,loc,x,10
nsel,r,loc,y,10
*get,u,NODE,NDNEXT(0),u,y
*SET,results(j,3) , u
PATH,hori,2,30,5000
PPATH,1,0,0,3,,0,
PPATH,2,0,5,3,,0,
PDEF,sy,S,Y,NOAVG
PCALC,INTG,intsy,SY,XG,1,
PAGET,array_hori,TABL
*SET,syh,array_hori(5001,6)
*DEL,array_hori
*SET,results(j,4),syh
allsel
*get,nn,NODE,0,count
*SET,results(j,2),nn*2
!! Netzgroesse anpassen
*SET,meshsize , meshsize/verfein
*enddo
/COM,ANSYS RELEASE 2020 R1           BUILD 20.1      UP20191203       14:07:09
*do,j,1,steps,1
/com,  %j%   %results(j,1)%   %results(j,2)%   %results(j,3)%   %results(j,4)%   %results(j,5)%   %results(j,6)%
*enddo
/gcol,1,max_u
*VPLOT,results(1,2),results(1,3)
weiter=1
/gcol,1,GG
*VPLOT,results(1,2),results(1,4)
weiter=1
*do,j,1,steps,1
/com,  %j%   %results(j,1)%   %results(j,2)%   %results(j,3)%   %results(j,4)%   %results(j,5)%   %results(j,6)%
*enddo
! *** exit the programm ***
!------------------------------------------------
finish
!/exit
/AUX12
FINISH
/POST26
FILE,'1011','rst','.'
NUMVAR,200
SOLU,191,NCMIT
STORE,MERGE
FILLDATA,191,,,,1,1
REALVAR,191,191
FINISH
/POST1
/SHOW,WIN32C
SET,FIRST
/PLOPTS,INFO,3
/CONTOUR,ALL,18
/NUMBER,1
! /UIS,ABORT,1
/SHOW,WIN32
! clear
! \Clear
! lcle
! \CLEAR,NOSTART
FINISH
FINISH
! \CLEAR,NOSTART
/NOPR   ! Suppress printing of UNDO process
/PMACRO ! Echo following commands to log
FINISH  ! Make sure we are at BEGIN level
/CLEAR,NOSTART  ! Clear model since no SAVE found
/COM,ANSYS RELEASE 2020 R1           BUILD 20.1      UP20191203       14:14:54
!Create House
! BLC4,0,0,8,8
! BLC4,1,0,1,2
! BLC4,5,5,1.5,1.5
! BLC4,2.5,5,1.5,1.5
/NOPR   ! Suppress printing of UNDO process
/PMACRO ! Echo following commands to log
FINISH  ! Make sure we are at BEGIN level
/CLEAR,NOSTART  ! Clear model since no SAVE found
/COM,ANSYS RELEASE 2020 R1           BUILD 20.1      UP20191203       14:15:33
!* Material Parameter und Materialmodelle
/PREP7
ET,1,PLANE182
KEYOPT,1,1,0
KEYOPT,1,3,3
KEYOPT,1,6,0
R,1,0.5,
MPTEMP,,,,,,,,
MPTEMP,1,0
MPDATA,EX,1,,6E7
MPDATA,PRXY,1,,0.2
!Create House
BLC4,0,0,8,8 !House
BLC4,1,0,1,2 !Door
BLC4,5,5,1.5,1.5 !Window
BLC4,2.5,5,1.5,1.5 !2nd Window
!========================================================
! Wandscheibe mit �ffnungen
! Einheiten: [kN],[m]
!========================================================
/nerr,0
*do,j,1,10,1
/com,
*enddo
/COM *** 5.2.2 ANSYS APDL ***
finish
/clear,start
/COM,ANSYS RELEASE 2020 R1           BUILD 20.1      UP20191203       14:17:06
/input,start,ans,'C:\Program Files\ANSYS Inc\v201\ANSYS\apdl\'
meshsize=0.5
verfein=2
steps=3
*DIM,results,TABLE,steps,6
*TAXIS,results(1,1),1,1.,2.,3.,4.,5.,6.,7.,8.,9.,10.,
*TAXIS,results(1,1),2,1.,2.,3.,4.,5.,6.
*dim, c,, steps,10, 1 ! Example Matrix
*SET,enow , 0
*do, ct, 1, 10
*do, ct2, 1, 10
*SET,c(ct,ct2) , 0
*enddo
*enddo
!!! Writes out Matrix to matlab
*dmat, exportmatrix, D, import, APDL, c ! export to matrix file
*export, exportmatrix, mmf, mytemp.mtx
! *** loop to restart the calculation ***
!------------------------------------------------
*do,j,1,steps,1
/com,  %j%  %meshsize%
*SET,results(j,1) , meshsize
parsav,all
finish
/clear,start
/COM,ANSYS RELEASE 2020 R1           BUILD 20.1      UP20191203       14:17:15
/input,start,ans,'C:\Program Files\ANSYS Inc\v201\ANSYS\apdl\'
parres
/prep7
blc4,0,0,10,10
blc4,5,0,5,5
asba,1,2
ET,1,PLANE182
KEYOPT,1,1,0
KEYOPT,1,3,3
KEYOPT,1,6,0
r,1,0.2
mp,ex,1,30000000
mp,prxy,1,0.2
dl,9,,all
sfl,3,pres,250
esize,meshsize
amesh,all
cpintf,all
FINISH
/SOL
solve
FINISH
/POST1
! maximale Verschiebung bei 10;10
allsel
nsel,s,loc,x,10
nsel,r,loc,y,10
*get,u,NODE,NDNEXT(0),u,y
*SET,results(j,3) , u
*SET,c(j,3) , u
PATH,hori,2,30,5000
PPATH,1,0,0,3,,0,
PPATH,2,0,5,3,,0,
PDEF,sy,S,Y,NOAVG
PCALC,INTG,intsy,SY,XG,1,
PAGET,array_hori,TABL
*SET,syh,array_hori(5001,6)
*DEL,array_hori
*SET,results(j,4),syh
allsel
*get,nn,NODE,0,count
*SET,results(j,2),nn*2
!! Netzgroesse anpassen
*SET,meshsize , meshsize/verfein
*enddo
/COM,ANSYS RELEASE 2020 R1           BUILD 20.1      UP20191203       14:17:20
*do,j,1,steps,1
/com,  %j%   %results(j,1)%   %results(j,2)%   %results(j,3)%   %results(j,4)%   %results(j,5)%   %results(j,6)%
*enddo
/gcol,1,max_u
*VPLOT,results(1,2),results(1,3)
weiter=1
/gcol,1,GG
*VPLOT,results(1,2),results(1,4)
weiter=1
*do,j,1,steps,1
/com,  %j%   %results(j,1)%   %results(j,2)%   %results(j,3)%   %results(j,4)%   %results(j,5)%   %results(j,6)%
*enddo
! *** exit the programm ***
!------------------------------------------------
finish
!/exit
!========================================================
! Wandscheibe mit �ffnungen
! Einheiten: [kN],[m]
!========================================================
/nerr,0
*do,j,1,10,1
/com,
*enddo
/COM *** 5.2.2 ANSYS APDL ***
finish
/clear,start
/COM,ANSYS RELEASE 2020 R1           BUILD 20.1      UP20191203       14:19:40
/input,start,ans,'C:\Program Files\ANSYS Inc\v201\ANSYS\apdl\'
meshsize=0.5
verfein=2
steps=3
*DIM,results,TABLE,steps,6
*TAXIS,results(1,1),1,1.,2.,3.,4.,5.,6.,7.,8.,9.,10.,
*TAXIS,results(1,1),2,1.,2.,3.,4.,5.,6.
*dim, c,, steps,10, 1 ! Example Matrix
*SET,enow , 0
*do, ct, 1, 10
*do, ct2, 1, 10
*SET,c(ct,ct2) , 0
*enddo
*enddo
! *** loop to restart the calculation ***
!------------------------------------------------
*do,j,1,steps,1
/com,  %j%  %meshsize%
*SET,results(j,1) , meshsize
parsav,all
finish
/clear,start
/COM,ANSYS RELEASE 2020 R1           BUILD 20.1      UP20191203       14:19:48
/input,start,ans,'C:\Program Files\ANSYS Inc\v201\ANSYS\apdl\'
parres
/prep7
blc4,0,0,10,10
blc4,5,0,5,5
asba,1,2
ET,1,PLANE182
KEYOPT,1,1,0
KEYOPT,1,3,3
KEYOPT,1,6,0
r,1,0.2
mp,ex,1,30000000
mp,prxy,1,0.2
dl,9,,all
sfl,3,pres,250
esize,meshsize
amesh,all
cpintf,all
FINISH
/SOL
solve
FINISH
/POST1
! maximale Verschiebung bei 10;10
allsel
nsel,s,loc,x,10
nsel,r,loc,y,10
*get,u,NODE,NDNEXT(0),u,y
*SET,results(j,3) , u
*SET,c(j,3) , u
PATH,hori,2,30,5000
PPATH,1,0,0,3,,0,
PPATH,2,0,5,3,,0,
PDEF,sy,S,Y,NOAVG
PCALC,INTG,intsy,SY,XG,1,
PAGET,array_hori,TABL
*SET,syh,array_hori(5001,6)
*DEL,array_hori
*SET,results(j,4),syh
allsel
*get,nn,NODE,0,count
*SET,results(j,2),nn*2
!! Netzgroesse anpassen
*SET,meshsize , meshsize/verfein
*enddo
/COM,ANSYS RELEASE 2020 R1           BUILD 20.1      UP20191203       14:19:52
!!! Writes out Matrix to matlab
*dmat, exportmatrix, D, import, APDL, c ! export to matrix file
*export, exportmatrix, mmf, mytemp.mtx
! *** exit the programm ***
!------------------------------------------------
finish
!/exit
!========================================================
! Wandscheibe mit �ffnungen
! Einheiten: [kN],[m]
!========================================================
/nerr,0
*do,j,1,10,1
/com,
*enddo
/COM *** 5.2.2 ANSYS APDL ***
finish
/clear,start
/COM,ANSYS RELEASE 2020 R1           BUILD 20.1      UP20191203       14:36:48
/input,start,ans,'C:\Program Files\ANSYS Inc\v201\ANSYS\apdl\'
*SET,meshsize , 0.5
*SET,verfein , 2
*SET,steps , 3
startVal=5
*DIM,results,TABLE,steps,6
*TAXIS,results(1,1),1,1.,2.,3.,4.,5.,6.,7.,8.,9.,10.,
*TAXIS,results(1,1),2,1.,2.,3.,4.,5.,6.
*dim, c,, steps,10, 1 ! Example Matrix
*SET,enow , 0
*do, ct, 1, 10
*do, ct2, 1, 10
*SET,c(ct,ct2) , 0
*enddo
*enddo
! *** loop to restart the calculation ***
!------------------------------------------------
*do,j,1,steps,1
/com,  %j%  %meshsize%
*SET,results(j,1) , meshsize
parsav,all
finish
/clear,start
/COM,ANSYS RELEASE 2020 R1           BUILD 20.1      UP20191203       14:36:55
/input,start,ans,'C:\Program Files\ANSYS Inc\v201\ANSYS\apdl\'
parres
/prep7
blc4,0,0,10,10
blc4,5,0,5,5
asba,1,2
!-----------------
! Material
!
ET,1,PLANE182
KEYOPT,1,1,0
KEYOPT,1,3,3
KEYOPT,1,6,0
r,1,0.2
mp,ex,1,30000000
mp,prxy,1,0.2
dl,9,,all
sfl,3,pres,250
!----------------
! Mesh
!
esize,meshsize
amesh,all
cpintf,all
FINISH
/SOL
solve
FINISH
/POST1
! maximale Verschiebung bei 4,4
allsel
nsel,s,loc,x,4 !select
nsel,r,loc,y,4 !reselect
*get,u,NODE,NDNEXT(0),u,y
*SET,results(j,3) , u
*SET,c(j,3) , u
PATH,hori,2,30,5000
PPATH,1,0,0,3,,0,
PPATH,2,0,5,3,,0,
PDEF,sy,S,Y,NOAVG
PCALC,INTG,intsy,SY,XG,1,
PAGET,array_hori,TABL
*SET,syh,array_hori(5001,6)
*DEL,array_hori
*SET,results(j,4),syh
allsel
*get,nn,NODE,0,count
*SET,results(j,2),nn*2
!! Netzgroesse anpassen
*SET,meshsize , meshsize/verfein
*enddo
/COM,ANSYS RELEASE 2020 R1           BUILD 20.1      UP20191203       14:36:59
!!! Writes out Matrix to matlab
*dmat, exportmatrix, D, import, APDL, c ! export to matrix file
*export, exportmatrix, mmf, mytemp.mtx
! *** exit the programm ***
!------------------------------------------------
finish
!/exit
!========================================================
! Wandscheibe mit �ffnungen
! Einheiten: [kN],[m]
!========================================================
/nerr,0
*do,j,1,10,1
/com,
*enddo
/COM *** 5.2.2 ANSYS APDL ***
finish
/clear,start
/COM,ANSYS RELEASE 2020 R1           BUILD 20.1      UP20191203       14:38:13
/input,start,ans,'C:\Program Files\ANSYS Inc\v201\ANSYS\apdl\'
*SET,meshsize , 0.5
*SET,verfein , 1
*SET,steps , 30
startVal=98
*DIM,results,TABLE,steps,6
*TAXIS,results(1,1),1,1.,2.,3.,4.,5.,6.,7.,8.,9.,10.,
*TAXIS,results(1,1),2,1.,2.,3.,4.,5.,6.
*dim, c,, steps,10, 1 ! Example Matrix
*SET,enow , 0
*do, ct, 1, 10
*do, ct2, 1, 10
*SET,c(ct,ct2) , 0
*enddo
*enddo
! *** loop to restart the calculation ***
!------------------------------------------------
*do,j,1,steps,1
/com,  %j%  %meshsize%
*SET,results(j,1) , meshsize
parsav,all
finish
/clear,start
/COM,ANSYS RELEASE 2020 R1           BUILD 20.1      UP20191203       14:38:18
/input,start,ans,'C:\Program Files\ANSYS Inc\v201\ANSYS\apdl\'
parres
/prep7
blc4,0,0,10,10
blc4,5,0,5,5
asba,1,2
!-----------------
! Material
!
ET,1,PLANE182
KEYOPT,1,1,0
KEYOPT,1,3,3
KEYOPT,1,6,0
r,1,0.2
mp,ex,1,30000000
mp,prxy,1,0.2
dl,9,,all
sfl,3,pres,250
!----------------
! Mesh
!
esize,meshsize
amesh,all
cpintf,all
FINISH
/SOL
solve
FINISH
/POST1
! maximale Verschiebung bei 4,4
allsel
nsel,s,loc,x,4 !select
nsel,r,loc,y,4 !reselect
*get,u,NODE,NDNEXT(0),u,y
*SET,results(j,3) , u
*SET,c(j,3) , u
PATH,hori,2,30,5000
PPATH,1,0,0,3,,0,
PPATH,2,0,5,3,,0,
PDEF,sy,S,Y,NOAVG
PCALC,INTG,intsy,SY,XG,1,
PAGET,array_hori,TABL
*SET,syh,array_hori(5001,6)
*DEL,array_hori
*SET,results(j,4),syh
allsel
*get,nn,NODE,0,count
*SET,results(j,2),nn*2
!! Netzgroesse anpassen
*SET,meshsize , meshsize/verfein
*enddo
/COM,ANSYS RELEASE 2020 R1           BUILD 20.1      UP20191203       14:38:39
!!! Writes out Matrix to matlab
*dmat, exportmatrix, D, import, APDL, c ! export to matrix file
*export, exportmatrix, mmf, mytemp.mtx
! *** exit the programm ***
!------------------------------------------------
finish
!/exit
!========================================================
! Wandscheibe mit �ffnungen
! Einheiten: [kN],[m]
!========================================================
/nerr,0
*do,j,1,10,1
/com,
*enddo
/COM *** 5.2.2 ANSYS APDL ***
finish
/clear,start
/COM,ANSYS RELEASE 2020 R1           BUILD 20.1      UP20191203       14:42:22
/input,start,ans,'C:\Program Files\ANSYS Inc\v201\ANSYS\apdl\'
*SET,meshsize , 0.5
*SET,verfein , 1
*SET,steps , 30
startVal=2
*DIM,results,TABLE,steps,6
*TAXIS,results(1,1),1,1.,2.,3.,4.,5.,6.,7.,8.,9.,10.,
*TAXIS,results(1,1),2,1.,2.,3.,4.,5.,6.
*dim, c,, steps,10, 1 ! Example Matrix
*SET,enow , 0
*do, ct, 1, 10
*do, ct2, 1, 10
*SET,c(ct,ct2) , 0
*enddo
*enddo
! *** loop to restart the calculation ***
!------------------------------------------------
*do,j,1,steps,1
/com,  %j%  %meshsize%
*SET,results(j,1) , meshsize
parsav,all
finish
/clear,start
/COM,ANSYS RELEASE 2020 R1           BUILD 20.1      UP20191203       14:42:26
/input,start,ans,'C:\Program Files\ANSYS Inc\v201\ANSYS\apdl\'
parres
/prep7
!-----------------
!Create House
!-----------------
BLC4,0,0,8,8 !House
BLC4,1,0,1,2 !Door
BLC4,5,5,1.5,1.5 !Window
BLC4,2.5,5,1.5,1.5 !2nd Window
FLST,3,3,5,ORDE,2
FITEM,3,2
FITEM,3,-4
ASBA,       1,P51X
!blc4,0,0,10,10
!blc4,5,0,5,5
!asba,1,2
!-----------------
! Material
!-----------------
ET,1,PLANE182
KEYOPT,1,1,0
KEYOPT,1,3,3
KEYOPT,1,6,0
r,1,0.2
mp,ex,1,30000000
mp,prxy,1,0.2
dl,9,,all
sfl,3,pres,250
!----------------
! Mesh
!
esize,meshsize
amesh,all
cpintf,all
FINISH
/SOL
solve
FINISH
/POST1
! maximale Verschiebung bei 4,4
allsel
nsel,s,loc,x,4 !select
nsel,r,loc,y,4 !reselect
*get,u,NODE,NDNEXT(0),u,y
*SET,results(j,3) , u
*SET,c(j,3) , u
*enddo
/COM,ANSYS RELEASE 2020 R1           BUILD 20.1      UP20191203       14:42:44
!!! Writes out Matrix to matlab
*dmat, exportmatrix, D, import, APDL, c ! export to matrix file
*export, exportmatrix, mmf, mytemp.mtx
! *** exit the programm ***
!------------------------------------------------
finish
!/exit
!========================================================
! Wandscheibe mit �ffnungen
! Einheiten: [kN],[m]
!========================================================
/nerr,0
*do,j,1,10,1
/com,
*enddo
/COM *** 5.2.2 ANSYS APDL ***
finish
/clear,start
/COM,ANSYS RELEASE 2020 R1           BUILD 20.1      UP20191203       14:45:54
/input,start,ans,'C:\Program Files\ANSYS Inc\v201\ANSYS\apdl\'
*SET,meshsize , 0.5
*SET,verfein , 1
*SET,steps , 30
startVal=3
*DIM,results,TABLE,steps,6
*TAXIS,results(1,1),1,1.,2.,3.,4.,5.,6.,7.,8.,9.,10.,
*TAXIS,results(1,1),2,1.,2.,3.,4.,5.,6.
*dim, c,, steps,10, 1 ! Example Matrix
*SET,enow , 0
*do, ct, 1, 10
*do, ct2, 1, 10
*SET,c(ct,ct2) , startVal
*enddo
*enddo
! *** loop to restart the calculation ***
!------------------------------------------------
*do,j,1,steps,1
/com,  %j%  %meshsize%
*SET,results(j,1) , meshsize
parsav,all
finish
/clear,start
/COM,ANSYS RELEASE 2020 R1           BUILD 20.1      UP20191203       14:46:12
/input,start,ans,'C:\Program Files\ANSYS Inc\v201\ANSYS\apdl\'
parres
/prep7
!-----------------
!Create House
!-----------------
BLC4,0,0,8,8 !House
BLC4,1,0,1,2 !Door
BLC4,5,5,1.5,1.5 !Window
BLC4,2.5,5,1.5,1.5 !2nd Window
FLST,3,3,5,ORDE,2
FITEM,3,2
FITEM,3,-4
ASBA,       1,P51X
!blc4,0,0,10,10
!blc4,5,0,5,5
!asba,1,2
!-----------------
! Material
!-----------------
ET,1,PLANE182
KEYOPT,1,1,0
KEYOPT,1,3,3
KEYOPT,1,6,0
r,1,0.2
mp,ex,1,30000000
mp,prxy,1,0.2
dl,9,,all
sfl,3,pres,250
!----------------
! Mesh
!
esize,meshsize
amesh,all
cpintf,all
FINISH
/SOL
solve
FINISH
/POST1
! maximale Verschiebung bei 4,4
allsel
nsel,s,loc,x,4 !select
nsel,r,loc,y,4 !reselect
*get,u,NODE,NDNEXT(0),u,y
*SET,results(j,3) , u
*SET,c(j,3) , u
*enddo
/COM,ANSYS RELEASE 2020 R1           BUILD 20.1      UP20191203       14:46:36
!!! Writes out Matrix to matlab
*dmat, exportmatrix, D, import, APDL, c ! export to matrix file
*export, exportmatrix, mmf, mytemp.mtx
! *** exit the programm ***
!------------------------------------------------
finish
!/exit
/NOPR   ! Suppress printing of UNDO process
/PMACRO ! Echo following commands to log
FINISH  ! Make sure we are at BEGIN level
/CLEAR,NOSTART  ! Clear model since no SAVE found
/COM,ANSYS RELEASE 2020 R1           BUILD 20.1      UP20191203       14:50:44
!* Material Parameter und Materialmodelle
/PREP7
ET,1,PLANE182
KEYOPT,1,1,0
KEYOPT,1,3,3
KEYOPT,1,6,0
R,1,0.5,
MPTEMP,,,,,,,,
MPTEMP,1,0
MPDATA,EX,1,,6E7
MPDATA,PRXY,1,,0.2
!Create House
BLC4,0,0,8,8 !House
BLC4,1,0,1,2 !Door
BLC4,5,5,1.5,1.5 !Window
BLC4,2.5,5,1.5,1.5 !2nd Window
FLST,3,3,5,ORDE,2
FITEM,3,2
FITEM,3,-4
ASBA,       1,P51X
APLOT
LPLOT
/NUMBER,0
!========================================================
! Wandscheibe mit �ffnungen
! Einheiten: [kN],[m]
!========================================================
/nerr,0
*do,j,1,10,1
/com,
*enddo
/COM *** 5.2.2 ANSYS APDL ***
finish
/clear,start
/COM,ANSYS RELEASE 2020 R1           BUILD 20.1      UP20191203       14:57:18
/input,start,ans,'C:\Program Files\ANSYS Inc\v201\ANSYS\apdl\'
*SET,meshsize , 0.5
*SET,verfein , 1
*SET,steps , 30
startVal=1
*DIM,results,TABLE,steps,6
*TAXIS,results(1,1),1,1.,2.,3.,4.,5.,6.,7.,8.,9.,10.,
*TAXIS,results(1,1),2,1.,2.,3.,4.,5.,6.
*dim, c,, steps,10, 1 ! Example Matrix
*SET,enow , 0
*do, ct, 1, steps
*do, ct2, 1, 10
*SET,c(ct,ct2) , startVal
*enddo
*enddo
!-----------------
!Parameter
!-----------------
*SET,xStart , 0
*SET,yStart , 0
*SET,height , 8
*SET,width , 8
*SET,doorX , 1
*SET,doorY , 2
*SET,windW , 1.25
*SET,windH , 1.25
*SET,margin , 1
*SET,windMargin , 0.125
*SET,doorStep , 1
*SET,data , 0
! *** loop to restart the calculation ***
!------------------------------------------------
*do,j,1,steps,1
/com,  %j%  %meshsize%
*SET,results(j,1) , meshsize
parsav,all
finish
/clear,start
/COM,ANSYS RELEASE 2020 R1           BUILD 20.1      UP20191203       14:57:23
/input,start,ans,'C:\Program Files\ANSYS Inc\v201\ANSYS\apdl\'
parres
/prep7
!-----------------
!Create House
!-----------------
BLC4,xStart, yStart, width, height !House
BLC4,1,0,1,2 !Door
BLC4,5,5,1.5,1.5 !Window
BLC4,2.5,5,1.5,1.5 !2nd Window
FLST,3,3,5,ORDE,2
FITEM,3,2
FITEM,3,-4
ASBA,       1,P51X
!blc4,0,0,10,10
!blc4,5,0,5,5
!asba,1,2
!-----------------
! Material
!-----------------
ET,1,PLANE182
KEYOPT,1,1,0
KEYOPT,1,3,3
KEYOPT,1,6,0
r,1,0.2
mp,ex,1,30000000
mp,prxy,1,0.2
dl,17,,all
dl,18,,all
sfl,3,pres,250
!----------------
! Mesh
!
esize,meshsize
amesh,all
cpintf,all
FINISH
/SOL
solve
FINISH
/POST1
! maximale Verschiebung bei 4,4
allsel
nsel,s,loc,x,4 !select
nsel,r,loc,y,4 !reselect
*get,u,NODE,NDNEXT(0),u,y
*SET,results(j,3) , u
*SET,c(j,3) , u
*enddo
/COM,ANSYS RELEASE 2020 R1           BUILD 20.1      UP20191203       14:57:44
!!! Writes out Matrix to matlab
*dmat, exportmatrix, D, import, APDL, c ! export to matrix file
*export, exportmatrix, mmf, mytemp.mtx
! *** exit the programm ***
!------------------------------------------------
finish
!/exit
!========================================================
! Wandscheibe mit �ffnungen
! Einheiten: [kN],[m]
!========================================================
/nerr,0
*do,j,1,10,1
/com,
*enddo
/COM *** 5.2.2 ANSYS APDL ***
finish
/clear,start
/COM,ANSYS RELEASE 2020 R1           BUILD 20.1      UP20191203       15:00:32
/input,start,ans,'C:\Program Files\ANSYS Inc\v201\ANSYS\apdl\'
!-----------------
!Parameter
!-----------------
*SET,xStart , 0
*SET,yStart , 0
*SET,height , 8
*SET,width , 8
*SET,doorX , 1
*SET,doorY , 2
*SET,windW , 1.25
*SET,windH , 1.25
*SET,margin , 1
*SET,windMargin , 0.125
*SET,doorStep , 1
*SET,data , 0
*SET,meshsize , 0.5
*SET,verfein , 1
*SET,steps , 10
startVal=5
*DIM,results,TABLE,steps,6
*TAXIS,results(1,1),1,1.,2.,3.,4.,5.,6.,7.,8.,9.,10.,
*TAXIS,results(1,1),2,1.,2.,3.,4.,5.,6.
*dim, c,, steps,10, 1 ! Example Matrix
*SET,enow , 0
*do, ct, 1, steps
*do, ct2, 1, 10
*SET,c(ct,ct2) , startVal
*enddo
*enddo
! *** loop to restart the calculation ***
!------------------------------------------------
*do,j,1,steps,1
/prep7
!-----------------
!Create House
!-----------------
BLC4,xStart, yStart, width, height !House
BLC4,1,0,1,2 !Door
BLC4,5,5,1.5,1.5 !Window
BLC4,2.5,5,1.5,1.5 !2nd Window
FLST,3,3,5,ORDE,2
FITEM,3,2
FITEM,3,-4
ASBA,       1,P51X
!blc4,0,0,10,10
!blc4,5,0,5,5
!asba,1,2
!-----------------
! Material
!-----------------
ET,1,PLANE182
KEYOPT,1,1,0
KEYOPT,1,3,3
KEYOPT,1,6,0
r,1,0.2
mp,ex,1,30000000
mp,prxy,1,0.2
dl,17,,all
dl,18,,all
sfl,3,pres,250
!----------------
! Mesh
!
esize,meshsize
amesh,all
cpintf,all
FINISH
/SOL
solve
FINISH
/POST1
! maximale Verschiebung bei 4,4
allsel
nsel,s,loc,x,4 !select
nsel,r,loc,y,4 !reselect
*get,u,NODE,NDNEXT(0),u,y
*SET,results(j,3) , u
*SET,c(j,3) , u
*enddo
!!! Writes out Matrix to matlab
*dmat, exportmatrix, D, import, APDL, c ! export to matrix file
*export, exportmatrix, mmf, mytemp.mtx
! *** exit the programm ***
!------------------------------------------------
finish
!/exit
/POST1
/SHOW,WIN32C
SET,FIRST
/PLOPTS,INFO,3
/CONTOUR,ALL,18
/NUMBER,1
PLNSOL,U,X
! /UIS,ABORT,1
/SHOW,WIN32
!========================================================
! Wandscheibe mit �ffnungen
! Einheiten: [kN],[m]
!========================================================
/nerr,0
*do,j,1,10,1
/com,
*enddo
/COM *** 5.2.2 ANSYS APDL ***
finish
/clear,start
/COM,ANSYS RELEASE 2020 R1           BUILD 20.1      UP20191203       15:05:36
/input,start,ans,'C:\Program Files\ANSYS Inc\v201\ANSYS\apdl\'
!-----------------
!Parameter
!-----------------
*SET,xStart , 0
*SET,yStart , 0
*SET,height , 8
*SET,width , 8
*SET,doorX , 1
*SET,doorY , 2
*SET,windW , 1.25
*SET,windH , 1.25
*SET,margin , 1
*SET,windMargin , 0.125
*SET,doorStep , 1
*SET,data , 0
*SET,meshsize , 0.5
*SET,verfein , 1
*SET,steps , 10
startVal=2
*DIM,results,TABLE,steps,6
*TAXIS,results(1,1),1,1.,2.,3.,4.,5.,6.,7.,8.,9.,10.,
*TAXIS,results(1,1),2,1.,2.,3.,4.,5.,6.
*dim, c,, steps,10, 1 ! Example Matrix
*SET,enow , 0
*do, ct, 1, steps
*do, ct2, 1, 10
*SET,c(ct,ct2) , startVal
*enddo
*enddo
! *** loop to restart the calculation ***
!------------------------------------------------
*do,j,1,steps,1
/prep7
!-----------------
!Create House
!-----------------
BLC4,xStart, yStart, width, height !House
BLC4,1,0,1,2 !Door
BLC4,5,5,1.5,1.5 !Window
BLC4,2.5,5,1.5,1.5 !2nd Window
!FLST,3,3,5,ORDE,2
!FITEM,3,2
!FITEM,3,-4
ASBA,       1,P51X
!-----------------
! Material
!-----------------
ET,1,PLANE182
KEYOPT,1,1,0
KEYOPT,1,3,3
KEYOPT,1,6,0
r,1,0.2
mp,ex,1,30000000
mp,prxy,1,0.2
dl,17,,all
dl,18,,all
sfl,3,pres,250
!----------------
! Mesh
!
esize,meshsize
amesh,all
cpintf,all
FINISH
/SOL
! solve
FINISH
/POST1
! maximale Verschiebung bei 4,4
allsel
nsel,s,loc,x,4 !select
nsel,r,loc,y,4 !reselect
*get,u,NODE,NDNEXT(0),u,y
*SET,results(j,3) , u
*SET,c(j,3) , u
*enddo
/BATCH
/COM,ANSYS RELEASE 2020 R1           BUILD 20.1      UP20191203       15:09:20
/input,menust,tmp,''
/GST,ON
/PLO,INFO,3
/GRO,CURL,ON
/CPLANE,1
WPSTYLE,,,,,,,,0
!========================================================
! Wandscheibe mit �ffnungen
! Einheiten: [kN],[m]
!========================================================
/nerr,0
*do,j,1,10,1
/com,
*enddo
/COM *** 5.2.2 ANSYS APDL ***
finish
/clear,start
/COM,ANSYS RELEASE 2020 R1           BUILD 20.1      UP20191203       15:09:28
/input,start,ans,'C:\Program Files\ANSYS Inc\v201\ANSYS\apdl\'
!-----------------
!Parameter
!-----------------
*SET,xStart , 0
*SET,yStart , 0
*SET,height , 8
*SET,width , 8
*SET,doorX , 1
*SET,doorY , 2
*SET,windW , 1.25
*SET,windH , 1.25
*SET,margin , 1
*SET,windMargin , 0.125
*SET,doorStep , 1
*SET,data , 0
*SET,meshsize , 0.5
*SET,verfein , 1
*SET,steps , 6
startVal=2
*DIM,results,TABLE,steps,6
*TAXIS,results(1,1),1,1.,2.,3.,4.,5.,6.,7.,8.,9.,10.,
*TAXIS,results(1,1),2,1.,2.,3.,4.,5.,6.
*dim, c,, steps,10, 1 ! Example Matrix
*SET,enow , 0
*do, ct, 1, steps
*do, ct2, 1, 10
*SET,c(ct,ct2) , startVal
*enddo
*enddo
! *** loop to restart the calculation ***
!------------------------------------------------
*do,door,1,steps,1
/prep7
!-----------------
!Create House
!-----------------
BLC4,xStart, yStart, width, height !House
BLC4,door,yStart, doorX, doorY !Door
BLC4,5,5,1.5,1.5 !Window
BLC4,2.5,5,1.5,1.5 !2nd Window
!Selecting and deleting the Door and the two windows
FLST,3,3,5,ORDE,2
FITEM,3,2
FITEM,3,-4
ASBA,       1,P51X
!-----------------
! Material
!-----------------
ET,1,PLANE182
KEYOPT,1,1,0
KEYOPT,1,3,3
KEYOPT,1,6,0
r,1,0.2
mp,ex,1,30000000
mp,prxy,1,0.2
dl,17,,all
dl,18,,all
sfl,3,pres,250
!----------------
! Mesh
!
esize,meshsize
amesh,all
cpintf,all
FINISH
/SOL
solve
FINISH
/POST1
! maximale Verschiebung bei 4,4
allsel
nsel,s,loc,x,4 !select
nsel,r,loc,y,4 !reselect
*get,u,NODE,NDNEXT(0),u,y
*SET,results(j,3) , u
*SET,c(j,3) , u
*enddo
!!! Writes out Matrix to matlab
*dmat, exportmatrix, D, import, APDL, c ! export to matrix file
*export, exportmatrix, mmf, mytemp.mtx
! *** exit the programm ***
!------------------------------------------------
finish
!/exit
!========================================================
! Wandscheibe mit �ffnungen
! Einheiten: [kN],[m]
!========================================================
/nerr,0
*do,j,1,10,1
/com,
*enddo
/COM *** 5.2.2 ANSYS APDL ***
finish
/clear,start
/COM,ANSYS RELEASE 2020 R1           BUILD 20.1      UP20191203       15:09:56
/input,start,ans,'C:\Program Files\ANSYS Inc\v201\ANSYS\apdl\'
!-----------------
!Parameter
!-----------------
*SET,xStart , 0
*SET,yStart , 0
*SET,height , 8
*SET,width , 8
*SET,doorX , 1
*SET,doorY , 2
*SET,windW , 1.25
*SET,windH , 1.25
*SET,margin , 1
*SET,windMargin , 0.125
*SET,doorStep , 1
*SET,data , 0
*SET,meshsize , 0.5
*SET,verfein , 1
*SET,steps , 6
startVal=1
*DIM,results,TABLE,steps,6
*TAXIS,results(1,1),1,1.,2.,3.,4.,5.,6.,7.,8.,9.,10.,
*TAXIS,results(1,1),2,1.,2.,3.,4.,5.,6.
*dim, c,, steps,10, 1 ! Example Matrix
*SET,enow , 0
*do, ct, 1, steps
*do, ct2, 1, 10
*SET,c(ct,ct2) , startVal
*enddo
*enddo
! *** loop to restart the calculation ***
!------------------------------------------------
*do,door,1,steps,1
/prep7
!-----------------
!Create House
!-----------------
BLC4,xStart, yStart, width, height !House
BLC4,door,yStart, doorX, doorY !Door
BLC4,5,5,1.5,1.5 !Window
BLC4,2.5,5,1.5,1.5 !2nd Window
!Selecting and deleting the Door and the two windows
FLST,3,3,5,ORDE,2
FITEM,3,2
FITEM,3,-4
ASBA,       1,P51X
!-----------------
! Material
!-----------------
ET,1,PLANE182
KEYOPT,1,1,0
KEYOPT,1,3,3
KEYOPT,1,6,0
r,1,0.2
mp,ex,1,30000000
mp,prxy,1,0.2
dl,17,,all
dl,18,,all
sfl,3,pres,250
!----------------
! Mesh
!
esize,meshsize
amesh,all
cpintf,all
FINISH
/SOL
solve
FINISH
/POST1
! maximale Verschiebung bei 4,4
allsel
nsel,s,loc,x,4 !select
nsel,r,loc,y,4 !reselect
*get,u,NODE,NDNEXT(0),u,y
*SET,results(j,3) , u
*SET,c(j,3) , u
*enddo
!!! Writes out Matrix to matlab
*dmat, exportmatrix, D, import, APDL, c ! export to matrix file
*export, exportmatrix, mmf, mytemp.mtx
! *** exit the programm ***
!------------------------------------------------
finish
!/exit
!========================================================
! Wandscheibe mit �ffnungen
! Einheiten: [kN],[m]
!========================================================
/nerr,0
*do,j,1,10,1
/com,
*enddo
/COM *** 5.2.2 ANSYS APDL ***
finish
/clear,start
/COM,ANSYS RELEASE 2020 R1           BUILD 20.1      UP20191203       15:13:05
/input,start,ans,'C:\Program Files\ANSYS Inc\v201\ANSYS\apdl\'
!-----------------
!Parameter
!-----------------
*SET,xStart , 0
*SET,yStart , 0
*SET,height , 8
*SET,width , 8
*SET,doorX , 1
*SET,doorY , 2
*SET,windW , 1.25
*SET,windH , 1.25
*SET,margin , 1
*SET,windMargin , 0.125
*SET,doorStep , 1
*SET,data , 0
*SET,meshsize , 0.5
*SET,verfein , 1
*SET,steps , 6
startVal=2
*DIM,results,TABLE,steps,6
*TAXIS,results(1,1),1,1.,2.,3.,4.,5.,6.,7.,8.,9.,10.,
*TAXIS,results(1,1),2,1.,2.,3.,4.,5.,6.
*dim, c,, steps,10, 1 ! Example Matrix
*SET,enow , 0
*do, ct, 1, steps
*do, ct2, 1, 10
*SET,c(ct,ct2) , startVal
*enddo
*enddo
! *** loop to restart the calculation ***
!------------------------------------------------
*do,door,1,steps,1
!-----------------
!Initialize Iter
!-----------------
parsav,all
finish
/clear,start
/COM,ANSYS RELEASE 2020 R1           BUILD 20.1      UP20191203       15:13:10
/input,start,ans,'C:\Program Files\ANSYS Inc\v201\ANSYS\apdl\'
parres
/prep7
!-----------------
!Create House
!-----------------
BLC4,xStart, yStart, width, height !House
BLC4,door,yStart, doorX, doorY !Door
BLC4,5,5,1.5,1.5 !Window
BLC4,2.5,5,1.5,1.5 !2nd Window
!Selecting and deleting the Door and the two windows
FLST,3,3,5,ORDE,2
FITEM,3,2
FITEM,3,-4
ASBA,       1,P51X
!-----------------
! Material
!-----------------
ET,1,PLANE182
KEYOPT,1,1,0
KEYOPT,1,3,3
KEYOPT,1,6,0
r,1,0.2
mp,ex,1,30000000
mp,prxy,1,0.2
dl,17,,all
dl,18,,all
sfl,3,pres,250
!----------------
! Mesh
!
esize,meshsize
amesh,all
cpintf,all
FINISH
/SOL
solve
FINISH
/POST1
! maximale Verschiebung bei 4,4
allsel
nsel,s,loc,x,4 !select
nsel,r,loc,y,4 !reselect
*get,u,NODE,NDNEXT(0),u,y
*SET,results(j,3) , u
*SET,c(j,3) , u
*enddo
/COM,ANSYS RELEASE 2020 R1           BUILD 20.1      UP20191203       15:13:17
!!! Writes out Matrix to matlab
*dmat, exportmatrix, D, import, APDL, c ! export to matrix file
*export, exportmatrix, mmf, mytemp.mtx
! *** exit the programm ***
!------------------------------------------------
finish
!/exit
!========================================================
! Wandscheibe mit �ffnungen
! Einheiten: [kN],[m]
!========================================================
/nerr,0
*do,j,1,10,1
/com,
*enddo
/COM *** 5.2.2 ANSYS APDL ***
finish
/clear,start
/COM,ANSYS RELEASE 2020 R1           BUILD 20.1      UP20191203       15:13:35
/input,start,ans,'C:\Program Files\ANSYS Inc\v201\ANSYS\apdl\'
!-----------------
!Parameter
!-----------------
*SET,xStart , 0
*SET,yStart , 0
*SET,height , 8
*SET,width , 8
*SET,doorX , 1
*SET,doorY , 2
*SET,windW , 1.25
*SET,windH , 1.25
*SET,margin , 1
*SET,windMargin , 0.125
*SET,doorStep , 1
*SET,data , 0
*SET,meshsize , 0.5
*SET,verfein , 1
*SET,steps , 6
startVal=4
*DIM,results,TABLE,steps,6
*TAXIS,results(1,1),1,1.,2.,3.,4.,5.,6.,7.,8.,9.,10.,
*TAXIS,results(1,1),2,1.,2.,3.,4.,5.,6.
*dim, c,, steps,10, 1 ! Example Matrix
*SET,enow , 0
*do, ct, 1, steps
*do, ct2, 1, 10
*SET,c(ct,ct2) , startVal
*enddo
*enddo
! *** loop to restart the calculation ***
!------------------------------------------------
*do,door,1,steps,1
!-----------------
!Initialize Iter
!-----------------
parsav,all
finish
/clear,start
/COM,ANSYS RELEASE 2020 R1           BUILD 20.1      UP20191203       15:13:37
/input,start,ans,'C:\Program Files\ANSYS Inc\v201\ANSYS\apdl\'
parres
/prep7
!-----------------
!Create House
!-----------------
BLC4,xStart, yStart, width, height !House
BLC4,door,yStart, doorX, doorY !Door
BLC4,5,5,1.5,1.5 !Window
BLC4,2.5,5,1.5,1.5 !2nd Window
!Selecting and deleting the Door and the two windows
FLST,3,3,5,ORDE,2
FITEM,3,2
FITEM,3,-4
ASBA,       1,P51X
!-----------------
! Material
!-----------------
ET,1,PLANE182
KEYOPT,1,1,0
KEYOPT,1,3,3
KEYOPT,1,6,0
r,1,0.2
mp,ex,1,30000000
mp,prxy,1,0.2
dl,17,,all
dl,18,,all
sfl,3,pres,250
!----------------
! Mesh
!
esize,meshsize
amesh,all
cpintf,all
FINISH
/SOL
solve
FINISH
/POST1
! maximale Verschiebung bei 4,4
allsel
nsel,s,loc,x,4 !select
nsel,r,loc,y,4 !reselect
*get,u,NODE,NDNEXT(0),u,y
*SET,results(j,3) , u
*SET,c(j,3) , u
*enddo
/COM,ANSYS RELEASE 2020 R1           BUILD 20.1      UP20191203       15:13:58
!!! Writes out Matrix to matlab
*dmat, exportmatrix, D, import, APDL, c ! export to matrix file
*export, exportmatrix, mmf, mytemp.mtx
! *** exit the programm ***
!------------------------------------------------
finish
!/exit
!========================================================
! Wandscheibe mit �ffnungen
! Einheiten: [kN],[m]
!========================================================
/nerr,0
*do,j,1,10,1
/com,
*enddo
/COM *** 5.2.2 ANSYS APDL ***
finish
/clear,start
/COM,ANSYS RELEASE 2020 R1           BUILD 20.1      UP20191203       15:15:25
/input,start,ans,'C:\Program Files\ANSYS Inc\v201\ANSYS\apdl\'
!-----------------
!Parameter
!-----------------
*SET,xStart , 0
*SET,yStart , 0
*SET,height , 8
*SET,width , 8
*SET,doorX , 1
*SET,doorY , 2
*SET,windW , 1.25
*SET,windH , 1.25
*SET,margin , 1
*SET,windMargin , 0.125
*SET,doorStep , 1
*SET,data , 0
*SET,meshsize , 0.5
*SET,verfein , 1
*SET,steps , 6
startVal=4
*DIM,results,TABLE,steps,6
*TAXIS,results(1,1),1,1.,2.,3.,4.,5.,6.,7.,8.,9.,10.,
*TAXIS,results(1,1),2,1.,2.,3.,4.,5.,6.
*dim, c,, steps,10, 1 ! Example Matrix
*SET,enow , 0
*do, ct, 1, steps
*do, ct2, 1, 10
*SET,c(ct,ct2) , startVal
*enddo
*enddo
! *** loop to restart the calculation ***
!------------------------------------------------
*do,door,1,steps,1
!-----------------
!Initialize Iter
!-----------------
parsav,all
finish
/clear,start
/COM,ANSYS RELEASE 2020 R1           BUILD 20.1      UP20191203       15:15:30
/input,start,ans,'C:\Program Files\ANSYS Inc\v201\ANSYS\apdl\'
parres
/prep7
!-----------------
!Create House
!-----------------
BLC4,xStart, yStart, width, height !House
BLC4,door,yStart, doorX, doorY !Door
BLC4,5,5,1.5,1.5 !Window
BLC4,2.5,5,1.5,1.5 !2nd Window
!Selecting and deleting the Door and the two windows
FLST,3,3,5,ORDE,2
FITEM,3,2
FITEM,3,-4
ASBA,       1,P51X
!-----------------
! Material
!-----------------
ET,1,PLANE182
KEYOPT,1,1,0
KEYOPT,1,3,3
KEYOPT,1,6,0
r,1,0.2
mp,ex,1,30000000
mp,prxy,1,0.2
dl,17,,all
dl,18,,all
sfl,3,pres,250
!----------------
! Mesh
!
esize,meshsize
amesh,all
cpintf,all
FINISH
/SOL
solve
FINISH
/POST1
! maximale Verschiebung bei 4,4
allsel
nsel,s,loc,x,4 !select
nsel,r,loc,y,4 !reselect
*get,u,NODE,NDNEXT(0),u,y
*SET,results(j,3) , u
*SET,c(j,3) , u
*enddo
/COM,ANSYS RELEASE 2020 R1           BUILD 20.1      UP20191203       15:15:43
!!! Writes out Matrix to matlab
*dmat, exportmatrix, D, import, APDL, c ! export to matrix file
*export, exportmatrix, mmf, mytemp.mtx
! *** exit the programm ***
!------------------------------------------------
finish
!/exit
!========================================================
! Wandscheibe mit �ffnungen
! Einheiten: [kN],[m]
!========================================================
/nerr,0
*do,j,1,10,1
/com,
*enddo
/COM *** 5.2.2 ANSYS APDL ***
finish
/clear,start
/COM,ANSYS RELEASE 2020 R1           BUILD 20.1      UP20191203       15:20:01
/input,start,ans,'C:\Program Files\ANSYS Inc\v201\ANSYS\apdl\'
!-----------------
!Parameter
!-----------------
*SET,xStart , 0
*SET,yStart , 0
*SET,height , 8
*SET,width , 8
*SET,doorX , 1
*SET,doorY , 2
*SET,windW , 1.25
*SET,windH , 1.25
*SET,margin , 1
*SET,windMargin , 0.125
*SET,doorStep , 1
*SET,data , 0
*SET,meshsize , 0.5
*SET,verfein , 1
*SET,steps , 6
startVal=1
*DIM,results,TABLE,steps,6
*TAXIS,results(1,1),1,1.,2.,3.,4.,5.,6.,7.,8.,9.,10.,
*TAXIS,results(1,1),2,1.,2.,3.,4.,5.,6.
*dim, c,, steps,10, 1 ! Example Matrix
*SET,enow , 0
*do, ct, 1, steps
*do, ct2, 1, 10
*SET,c(ct,ct2) , startVal
*enddo
*enddo
! *** loop to restart the calculation ***
!------------------------------------------------
*do,door,1,steps,1
!-----------------
!Initialize Iter
!-----------------
parsav,all
finish
/clear,start
/COM,ANSYS RELEASE 2020 R1           BUILD 20.1      UP20191203       15:20:07
/input,start,ans,'C:\Program Files\ANSYS Inc\v201\ANSYS\apdl\'
parres
/prep7
!-----------------
!Create House
!-----------------
BLC4,xStart, yStart, width, height !House
BLC4,door,yStart, doorX, doorY !Door
BLC4,5,5,1.5,1.5 !Window
BLC4,2.5,5,1.5,1.5 !2nd Window
!Selecting and deleting the area of Door and the two windows
FLST,3,3,5,ORDE,2
FITEM,3,2
FITEM,3,-4
ASBA,       1,P51X
!-----------------
! Material
!-----------------
ET,1,PLANE182
KEYOPT,1,1,0
KEYOPT,1,3,3
KEYOPT,1,6,0
r,1,0.2
mp,ex,1,30000000
mp,prxy,1,0.2
dl,17,,all
dl,18,,all
sfl,3,pres,250
!----------------
! Mesh
!
esize,meshsize
amesh,all
cpintf,all
FINISH
/SOL
solve
FINISH
/POST1
! maximale Verschiebung bei 4,4
allsel
nsel,s,loc,x,4 !select
nsel,r,loc,y,4 !reselect
*get,u,NODE,NDNEXT(0),u,y
*SET,results(j,3) , u
*SET,c(j,3) , u
*enddo
/COM,ANSYS RELEASE 2020 R1           BUILD 20.1      UP20191203       15:20:13
!!! Writes out Matrix to matlab
*dmat, exportmatrix, D, import, APDL, c ! export to matrix file
*export, exportmatrix, mmf, mytemp.mtx
! *** exit the programm ***
!------------------------------------------------
finish
!/exit
!========================================================
! Wandscheibe mit �ffnungen
! Einheiten: [kN],[m]
!========================================================
/nerr,0
*do,j,1,10,1
/com,
*enddo
/COM *** 5.2.2 ANSYS APDL ***
finish
/clear,start
/COM,ANSYS RELEASE 2020 R1           BUILD 20.1      UP20191203       15:20:54
/input,start,ans,'C:\Program Files\ANSYS Inc\v201\ANSYS\apdl\'
!-----------------
!Parameter
!-----------------
*SET,xStart , 0
*SET,yStart , 0
*SET,height , 8
*SET,width , 8
*SET,doorX , 1
*SET,doorY , 2
*SET,windW , 1.25
*SET,windH , 1.25
*SET,margin , 1
*SET,windMargin , 0.125
*SET,doorStep , 1
*SET,data , 0
*SET,meshsize , 0.5
*SET,verfein , 1
*SET,steps , 6
startVal=1
*DIM,results,TABLE,steps,6
*TAXIS,results(1,1),1,1.,2.,3.,4.,5.,6.,7.,8.,9.,10.,
*TAXIS,results(1,1),2,1.,2.,3.,4.,5.,6.
*dim, c,, steps,10, 1 ! Example Matrix
*SET,enow , 0
*do, ct, 1, steps
*do, ct2, 1, 10
*SET,c(ct,ct2) , startVal
*enddo
*enddo
! *** loop to restart the calculation ***
!------------------------------------------------
*do,door,3,steps,1
!-----------------
!Initialize Iter
!-----------------
parsav,all
finish
/clear,start
/COM,ANSYS RELEASE 2020 R1           BUILD 20.1      UP20191203       15:20:58
/input,start,ans,'C:\Program Files\ANSYS Inc\v201\ANSYS\apdl\'
parres
/prep7
!-----------------
!Create House
!-----------------
BLC4,xStart, yStart, width, height !House
BLC4,door,yStart, doorX, doorY !Door
BLC4,5,5,1.5,1.5 !Window
BLC4,2.5,5,1.5,1.5 !2nd Window
!Selecting and deleting the area of Door and the two windows
FLST,3,3,5,ORDE,2
FITEM,3,2
FITEM,3,-4
ASBA,       1,P51X
!-----------------
! Material
!-----------------
ET,1,PLANE182
KEYOPT,1,1,0
KEYOPT,1,3,3
KEYOPT,1,6,0
r,1,0.2
mp,ex,1,30000000
mp,prxy,1,0.2
dl,17,,all
dl,18,,all
sfl,3,pres,250
!----------------
! Mesh
!
esize,meshsize
amesh,all
cpintf,all
FINISH
/SOL
solve
FINISH
/POST1
! maximale Verschiebung bei 4,4
allsel
nsel,s,loc,x,4 !select
nsel,r,loc,y,4 !reselect
*get,u,NODE,NDNEXT(0),u,y
*SET,results(j,3) , u
*SET,c(j,3) , u
*enddo
/COM,ANSYS RELEASE 2020 R1           BUILD 20.1      UP20191203       15:22:13
!!! Writes out Matrix to matlab
*dmat, exportmatrix, D, import, APDL, c ! export to matrix file
*export, exportmatrix, mmf, mytemp.mtx
! *** exit the programm ***
!------------------------------------------------
finish
!/exit
!========================================================
! Wandscheibe mit �ffnungen
! Einheiten: [kN],[m]
!========================================================
/nerr,0
*do,j,1,10,1
/com,
*enddo
/COM *** 5.2.2 ANSYS APDL ***
finish
/clear,start
/COM,ANSYS RELEASE 2020 R1           BUILD 20.1      UP20191203       15:22:18
/input,start,ans,'C:\Program Files\ANSYS Inc\v201\ANSYS\apdl\'
!-----------------
!Parameter
!-----------------
*SET,xStart , 0
*SET,yStart , 0
*SET,height , 8
*SET,width , 8
*SET,doorX , 1
*SET,doorY , 2
*SET,windW , 1.25
*SET,windH , 1.25
*SET,margin , 1
*SET,windMargin , 0.125
*SET,doorStep , 1
*SET,data , 0
*SET,meshsize , 0.5
*SET,verfein , 1
*SET,steps , 6
startVal=0
*DIM,results,TABLE,steps,6
*TAXIS,results(1,1),1,1.,2.,3.,4.,5.,6.,7.,8.,9.,10.,
*TAXIS,results(1,1),2,1.,2.,3.,4.,5.,6.
*dim, c,, steps,10, 1 ! Example Matrix
*SET,enow , 0
*do, ct, 1, steps
*do, ct2, 1, 10
*SET,c(ct,ct2) , startVal
*enddo
*enddo
! *** loop to restart the calculation ***
!------------------------------------------------
*do,door,3,steps,1
!-----------------
!Initialize Iter
!-----------------
parsav,all
finish
/clear,start
/COM,ANSYS RELEASE 2020 R1           BUILD 20.1      UP20191203       15:22:23
/input,start,ans,'C:\Program Files\ANSYS Inc\v201\ANSYS\apdl\'
parres
/prep7
!-----------------
!Create House
!-----------------
BLC4,xStart, yStart, width, height !House
BLC4,door,yStart, doorX, doorY !Door
BLC4,5,5,1.5,1.5 !Window
BLC4,2.5,5,1.5,1.5 !2nd Window
!Selecting and deleting the area of Door and the two windows
FLST,3,3,5,ORDE,2
FITEM,3,2
FITEM,3,-4
ASBA,       1,P51X
!-----------------
! Material
!-----------------
ET,1,PLANE182
KEYOPT,1,1,0
KEYOPT,1,3,3
KEYOPT,1,6,0
r,1,0.2
mp,ex,1,30000000
mp,prxy,1,0.2
dl,17,,all
dl,18,,all
sfl,3,pres,250
!----------------
! Mesh
!
esize,meshsize
amesh,all
cpintf,all
FINISH
/SOL
solve
FINISH
/POST1
! maximale Verschiebung bei 4,4
allsel
nsel,s,loc,x,4 !select
nsel,r,loc,y,4 !reselect
*get,u,NODE,NDNEXT(0),u,y
*SET,results(door,3) , u
*SET,c(door,3) , u
*enddo
/COM,ANSYS RELEASE 2020 R1           BUILD 20.1      UP20191203       15:22:27
!!! Writes out Matrix to matlab
*dmat, exportmatrix, D, import, APDL, c ! export to matrix file
*export, exportmatrix, mmf, mytemp.mtx
! *** exit the programm ***
!------------------------------------------------
finish
!/exit
!========================================================
! Wandscheibe mit �ffnungen
! Einheiten: [kN],[m]
!========================================================
/nerr,0
*do,j,1,10,1
/com,
*enddo
/COM *** 5.2.2 ANSYS APDL ***
finish
/clear,start
/COM,ANSYS RELEASE 2020 R1           BUILD 20.1      UP20191203       15:33:23
/input,start,ans,'C:\Program Files\ANSYS Inc\v201\ANSYS\apdl\'
!-----------------
!Parameter
!-----------------
*SET,xStart , 0
*SET,yStart , 0
*SET,height , 8
*SET,width , 8
*SET,doorX , 1
*SET,doorY , 2
*SET,windW , 1.25
*SET,windH , 1.25
*SET,margin , 1
*SET,windMargin , 0.125
*SET,doorStep , 1
*SET,data , 0
*SET,meshsize , 0.5
*SET,verfein , 1
*SET,steps , 6
startVal=0
*DIM,results,TABLE,steps,6
*TAXIS,results(1,1),1,1.,2.,3.,4.,5.,6.,7.,8.,9.,10.,
*TAXIS,results(1,1),2,1.,2.,3.,4.,5.,6.
*dim, c,, steps,9, 1 ! Example Matrix
*SET,enow , 0
*do, ct, 1, steps
*do, ct2, 1, 10
*SET,c(ct,ct2) , startVal
*enddo
*enddo
! *** loop to restart the calculation ***
!------------------------------------------------
*do,door,1,steps,1
!!!!!!
!TEMP!
*SET,n , door
*SET,wind1X , 3
*SET,wind1Y , 3
*SET,wind2X , 5
*SET,wind2Y , 3
!-----------------
!Initialize Iter
!-----------------
parsav,all
finish
/clear,start
/COM,ANSYS RELEASE 2020 R1           BUILD 20.1      UP20191203       15:33:31
/input,start,ans,'C:\Program Files\ANSYS Inc\v201\ANSYS\apdl\'
parres
/prep7
!-----------------
! Saving initial Param
!-----------------
*SET,c(n,1) , door
*SET,c(n,2) , wind1X
*SET,c(n,3) , wind1Y
*SET,c(n,4) , wind2X
*SET,c(n,5) , wind2Y
!-----------------
!Create House
!-----------------
BLC4,xStart, yStart, width, height !House
BLC4,door,yStart, doorX, doorY !Door
BLC4,wind1X,wind1Y,windW,windH !Window
BLC4,wind2X,wind2Y,windW,windH !2nd Window
!Selecting and deleting the area of Door and the two windows
FLST,3,3,5,ORDE,2
FITEM,3,2
FITEM,3,-4
ASBA,       1,P51X
!-----------------
! Material
!-----------------
ET,1,PLANE182
KEYOPT,1,1,0
KEYOPT,1,3,3
KEYOPT,1,6,0
r,1,0.2
mp,ex,1,30000000
mp,prxy,1,0.2
dl,17,,all
dl,18,,all
sfl,3,pres,250
!-----------------
! Mesh
!-----------------
esize,meshsize
amesh,all
cpintf,all
FINISH
/SOL
solve
FINISH
/POST1
!-----------------
! Value at point 4,4
!-----------------
!!!!!!!!!!!!!!!!!!!!!!!!!!!!!!!!!!
! T O   D O !!!!!!!!!!!!!!!!!!!!!!
!!!!!!!!!!!!!!!!!!!!!!!!!!!!!!!!!!
!Checken ob wir wirklich die Lösung bekommen die wir wollen
! maximale Verschiebung bei 4,4
allsel
nsel,s,loc,x,4 !select
nsel,r,loc,y,4 !reselect
*get,u,NODE,NDNEXT(0),u,y
*SET,c(door,3) , u
!
*enddo
/COM,ANSYS RELEASE 2020 R1           BUILD 20.1      UP20191203       15:33:38
!!! Writes out Matrix to matlab
*dmat, exportmatrix, D, import, APDL, c ! export to matrix file
*export, exportmatrix, mmf, mytemp.mtx
! *** exit the programm ***
!------------------------------------------------
finish
!/exit
!========================================================
! Wandscheibe mit �ffnungen
! Einheiten: [kN],[m]
!========================================================
/nerr,0
*do,j,1,10,1
/com,
*enddo
/COM *** 5.2.2 ANSYS APDL ***
finish
/clear,start
/COM,ANSYS RELEASE 2020 R1           BUILD 20.1      UP20191203       15:34:59
/input,start,ans,'C:\Program Files\ANSYS Inc\v201\ANSYS\apdl\'
!-----------------
!Parameter
!-----------------
*SET,xStart , 0
*SET,yStart , 0
*SET,height , 8
*SET,width , 8
*SET,doorX , 1
*SET,doorY , 2
*SET,windW , 1.25
*SET,windH , 1.25
*SET,margin , 1
*SET,windMargin , 0.125
*SET,doorStep , 1
*SET,data , 0
*SET,meshsize , 0.5
*SET,verfein , 1
*SET,steps , 6
startVal=1
*DIM,results,TABLE,steps,6
*TAXIS,results(1,1),1,1.,2.,3.,4.,5.,6.,7.,8.,9.,10.,
*TAXIS,results(1,1),2,1.,2.,3.,4.,5.,6.
*dim, c,, steps,9, 1 ! Example Matrix
*SET,enow , 0
*do, ct, 1, steps
*do, ct2, 1, 10
*SET,c(ct,ct2) , startVal
*enddo
*enddo
! *** loop to restart the calculation ***
!------------------------------------------------
*do,door,1,steps,1
!!!!!!
!TEMP!
*SET,n , door
*SET,wind1X , 3
*SET,wind1Y , 3
*SET,wind2X , 5
*SET,wind2Y , 3
!-----------------
!Initialize Iter
!-----------------
parsav,all
finish
/clear,start
/COM,ANSYS RELEASE 2020 R1           BUILD 20.1      UP20191203       15:35:07
/input,start,ans,'C:\Program Files\ANSYS Inc\v201\ANSYS\apdl\'
parres
/prep7
!-----------------
! Saving initial Param
!-----------------
*SET,c(n,1) , door
*SET,c(n,2) , wind1X
*SET,c(n,3) , wind1Y
*SET,c(n,4) , wind2X
*SET,c(n,5) , wind2Y
!-----------------
!Create House
!-----------------
BLC4,xStart, yStart, width, height !House
BLC4,door,yStart, doorX, doorY !Door
BLC4,wind1X,wind1Y,windW,windH !Window
BLC4,wind2X,wind2Y,windW,windH !2nd Window
!Selecting and deleting the area of Door and the two windows
FLST,3,3,5,ORDE,2
FITEM,3,2
FITEM,3,-4
ASBA,       1,P51X
!-----------------
! Material
!-----------------
ET,1,PLANE182
KEYOPT,1,1,0
KEYOPT,1,3,3
KEYOPT,1,6,0
r,1,0.2
mp,ex,1,30000000
mp,prxy,1,0.2
dl,17,,all
dl,18,,all
sfl,3,pres,250
!-----------------
! Mesh
!-----------------
esize,meshsize
amesh,all
cpintf,all
FINISH
/SOL
solve
FINISH
/POST1
!-----------------
! Value at point 4,4
!-----------------
!!!!!!!!!!!!!!!!!!!!!!!!!!!!!!!!!!
! T O   D O !!!!!!!!!!!!!!!!!!!!!!
!!!!!!!!!!!!!!!!!!!!!!!!!!!!!!!!!!
!Checken ob wir wirklich die Lösung bekommen die wir wollen
! maximale Verschiebung bei 4,4
allsel
nsel,s,loc,x,4 !select
nsel,r,loc,y,4 !reselect
*get,u,NODE,NDNEXT(0),u,y
*SET,c(n,6) , u
!
*enddo
/COM,ANSYS RELEASE 2020 R1           BUILD 20.1      UP20191203       15:35:14
!!! Writes out Matrix to matlab
*dmat, exportmatrix, D, import, APDL, c ! export to matrix file
*export, exportmatrix, mmf, mytemp.mtx
! *** exit the programm ***
!------------------------------------------------
finish
!/exit
! door,yStart, doorX, doorY
!========================================================
! Wandscheibe mit �ffnungen
! Einheiten: [kN],[m]
!========================================================
/nerr,0
*do,j,1,10,1
/com,
*enddo
/COM *** 5.2.2 ANSYS APDL ***
finish
/clear,start
/COM,ANSYS RELEASE 2020 R1           BUILD 20.1      UP20191203       15:44:56
/input,start,ans,'C:\Program Files\ANSYS Inc\v201\ANSYS\apdl\'
!-----------------
!Parameter
!-----------------
*SET,xStart , 0
*SET,yStart , 0
*SET,height , 8
*SET,width , 8
*SET,doorX , 1
*SET,doorY , 2
*SET,windW , 1.25
*SET,windH , 1.25
*SET,margin , 1
*SET,windMargin , 0.125
*SET,doorStep , 1
*SET,data , 0
*SET,meshsize , 0.5
*SET,verfein , 1
*SET,steps , 6
startVal=0
*dim, c,, steps,9, 1 ! Example Matrix
*SET,enow , 0
*do, ct, 1, steps
*do, ct2, 1, 10
*SET,c(ct,ct2) , startVal
*enddo
*enddo
! *** loop to restart the calculation ***
!------------------------------------------------
*do,door,1,steps,1
!!!!!!
!TEMP!
*SET,n , door
*SET,wind1X , 3
*SET,wind1Y , 3
*SET,wind2X , 5
*SET,wind2Y , 3
!-----------------
!Initialize Iter
!-----------------
parsav,all
finish
/clear,start
/COM,ANSYS RELEASE 2020 R1           BUILD 20.1      UP20191203       15:45:04
/input,start,ans,'C:\Program Files\ANSYS Inc\v201\ANSYS\apdl\'
parres
/prep7
!-----------------
! Saving initial Param
!-----------------
*SET,c(n,1) , door
*SET,c(n,2) , wind1X
*SET,c(n,3) , wind1Y
*SET,c(n,4) , wind2X
*SET,c(n,5) , wind2Y
!-----------------
!Create House
!-----------------
BLC4,xStart, yStart, width, height !House
BLC4,door,yStart, doorX, doorY !Door
BLC4,wind1X,wind1Y,windW,windH !Window
BLC4,wind2X,wind2Y,windW,windH !2nd Window
!Selecting and deleting the area of Door and the two windows
FLST,3,3,5,ORDE,2
FITEM,3,2
FITEM,3,-4
ASBA,       1,P51X
!-----------------
! Material
!-----------------
ET,1,PLANE182
KEYOPT,1,1,0
KEYOPT,1,3,3
KEYOPT,1,6,0
r,1,0.2
mp,ex,1,30000000
mp,prxy,1,0.2
dl,17,,all
dl,18,,all
sfl,3,pres,250000
!-----------------
! Mesh
!-----------------
esize,meshsize
amesh,all
cpintf,all
FINISH
/SOL
solve
FINISH
/POST1
!-----------------
! Value at point 4,4
!-----------------
!!!!!!!!!!!!!!!!!!!!!!!!!!!!!!!!!!
! T O   D O !!!!!!!!!!!!!!!!!!!!!!
!!!!!!!!!!!!!!!!!!!!!!!!!!!!!!!!!!
!Checken ob wir wirklich die Lösung bekommen die wir wollen
! maximale Verschiebung bei 4,4
allsel
nsel,s,loc,x,4 !select
nsel,r,loc,y,4 !reselect
*get,u,NODE,NDNEXT(0),u,y
*SET,c(n,6) , u
!
*enddo
/COM,ANSYS RELEASE 2020 R1           BUILD 20.1      UP20191203       15:45:12
!!! Writes out Matrix to matlab
*dmat, exportmatrix, D, import, APDL, c ! export to matrix file
*export, exportmatrix, mmf, mytemp.mtx
! *** exit the programm ***
!------------------------------------------------
finish
!/exit
!========================================================
! Wandscheibe mit �ffnungen
! Einheiten: [kN],[m]
!========================================================
/nerr,0
*do,j,1,10,1
/com,
*enddo
/COM *** 5.2.2 ANSYS APDL ***
finish
/clear,start
/COM,ANSYS RELEASE 2020 R1           BUILD 20.1      UP20191203       15:45:50
/input,start,ans,'C:\Program Files\ANSYS Inc\v201\ANSYS\apdl\'
!-----------------
!Parameter
!-----------------
*SET,xStart , 0
*SET,yStart , 0
*SET,height , 8
*SET,width , 8
*SET,doorX , 1
*SET,doorY , 2
*SET,windW , 1.25
*SET,windH , 1.25
*SET,margin , 1
*SET,windMargin , 0.125
*SET,doorStep , 1
*SET,data , 0
*SET,meshsize , 0.5
*SET,verfein , 1
*SET,steps , 6
startVal=0
*dim, c,, steps,9, 1 ! Example Matrix
*SET,enow , 0
*do, ct, 1, steps
*do, ct2, 1, 10
*SET,c(ct,ct2) , startVal
*enddo
*enddo
! *** loop to restart the calculation ***
!------------------------------------------------
*do,door,1,steps,1
!!!!!!
!TEMP!
*SET,n , door
*SET,wind1X , 1
*SET,wind1Y , 4
*SET,wind2X , 5
*SET,wind2Y , 3
!-----------------
!Initialize Iter
!-----------------
parsav,all
finish
/clear,start
/COM,ANSYS RELEASE 2020 R1           BUILD 20.1      UP20191203       15:46:02
/input,start,ans,'C:\Program Files\ANSYS Inc\v201\ANSYS\apdl\'
parres
/prep7
!-----------------
! Saving initial Param
!-----------------
*SET,c(n,1) , door
*SET,c(n,2) , wind1X
*SET,c(n,3) , wind1Y
*SET,c(n,4) , wind2X
*SET,c(n,5) , wind2Y
!-----------------
!Create House
!-----------------
BLC4,xStart, yStart, width, height !House
BLC4,door,yStart, doorX, doorY !Door
BLC4,wind1X,wind1Y,windW,windH !Window
BLC4,wind2X,wind2Y,windW,windH !2nd Window
!Selecting and deleting the area of Door and the two windows
FLST,3,3,5,ORDE,2
FITEM,3,2
FITEM,3,-4
ASBA,       1,P51X
!-----------------
! Material
!-----------------
ET,1,PLANE182
KEYOPT,1,1,0
KEYOPT,1,3,3
KEYOPT,1,6,0
r,1,0.2
mp,ex,1,30000000
mp,prxy,1,0.2
dl,17,,all
dl,18,,all
sfl,3,pres,250000
!-----------------
! Mesh
!-----------------
esize,meshsize
amesh,all
cpintf,all
FINISH
/SOL
solve
FINISH
/POST1
!-----------------
! Value at point 4,4
!-----------------
!!!!!!!!!!!!!!!!!!!!!!!!!!!!!!!!!!
! T O   D O !!!!!!!!!!!!!!!!!!!!!!
!!!!!!!!!!!!!!!!!!!!!!!!!!!!!!!!!!
!Checken ob wir wirklich die Lösung bekommen die wir wollen
! maximale Verschiebung bei 4,4
allsel
nsel,s,loc,x,4 !select
nsel,r,loc,y,4 !reselect
*get,u,NODE,NDNEXT(0),u,y
*SET,c(n,6) , u
!
*enddo
/COM,ANSYS RELEASE 2020 R1           BUILD 20.1      UP20191203       15:46:10
!!! Writes out Matrix to matlab
*dmat, exportmatrix, D, import, APDL, c ! export to matrix file
*export, exportmatrix, mmf, mytemp.mtx
! *** exit the programm ***
!------------------------------------------------
finish
!/exit
!========================================================
! Wandscheibe mit �ffnungen
! Einheiten: [kN],[m]
!========================================================
/nerr,0
*do,j,1,10,1
/com,
*enddo
/COM *** 5.2.2 ANSYS APDL ***
finish
/clear,start
/COM,ANSYS RELEASE 2020 R1           BUILD 20.1      UP20191203       15:49:04
/input,start,ans,'C:\Program Files\ANSYS Inc\v201\ANSYS\apdl\'
!-----------------
!Parameter
!-----------------
*SET,xStart , 0
*SET,yStart , 0
*SET,height , 8
*SET,width , 8
*SET,doorX , 1
*SET,doorY , 2
*SET,windW , 1.25
*SET,windH , 1.25
*SET,margin , 1
*SET,windMargin , 0.125
*SET,doorStep , 1
*SET,data , 0
*SET,meshsize , 0.5
*SET,verfein , 1
*SET,steps , 6
startVal=0
*dim, c,, steps,9, 1 ! Example Matrix
*SET,enow , 0
*do, ct, 1, steps
*do, ct2, 1, 10
*SET,c(ct,ct2) , startVal
*enddo
*enddo
! *** loop to restart the calculation ***
!------------------------------------------------
*do,door,1,steps,1
!!!!!!
!TEMP!
*SET,n , door
*SET,wind1X , 1
*SET,wind1Y , 4
*SET,wind2X , 5
*SET,wind2Y , 3
!-----------------
!Initialize Iter
!-----------------
parsav,all
finish
/clear,start
/COM,ANSYS RELEASE 2020 R1           BUILD 20.1      UP20191203       15:49:12
/input,start,ans,'C:\Program Files\ANSYS Inc\v201\ANSYS\apdl\'
parres
/prep7
!-----------------
! Saving initial Param
!-----------------
*SET,c(n,1) , door
*SET,c(n,2) , wind1X
*SET,c(n,3) , wind1Y
*SET,c(n,4) , wind2X
*SET,c(n,5) , wind2Y
!-----------------
!Create House
!-----------------
BLC4,xStart, yStart, width, height !House
BLC4,door,yStart, doorX, doorY !Door
BLC4,wind1X,wind1Y,windW,windH !Window
BLC4,wind2X,wind2Y,windW,windH !2nd Window
!Selecting and deleting the area of Door and the two windows
FLST,3,3,5,ORDE,2
FITEM,3,2
FITEM,3,-4
ASBA,       1,P51X
!-----------------
! Material
!-----------------
ET,1,PLANE182
KEYOPT,1,1,0
KEYOPT,1,3,3
KEYOPT,1,6,0
r,1,0.2
mp,ex,1,30000000
mp,prxy,1,0.2
dl,17,,all
dl,18,,all
sfl,3,pres,250000000
!-----------------
! Mesh
!-----------------
esize,meshsize
amesh,all
cpintf,all
FINISH
/SOL
solve
FINISH
/POST1
!-----------------
! Value at point 4,4
!-----------------
!!!!!!!!!!!!!!!!!!!!!!!!!!!!!!!!!!
! T O   D O !!!!!!!!!!!!!!!!!!!!!!
!!!!!!!!!!!!!!!!!!!!!!!!!!!!!!!!!!
!Checken ob wir wirklich die Lösung bekommen die wir wollen
! maximale Verschiebung bei 4,4
allsel
nsel,s,loc,x,4 !select
nsel,r,loc,y,4 !reselect
*get,u,NODE,NDNEXT(0),u,y
*SET,c(n,6) , u
!
*enddo
/COM,ANSYS RELEASE 2020 R1           BUILD 20.1      UP20191203       15:49:20
!!! Writes out Matrix to matlab
*dmat, exportmatrix, D, import, APDL, c ! export to matrix file
*export, exportmatrix, mmf, mytemp.mtx
! *** exit the programm ***
!------------------------------------------------
finish
!/exit
!========================================================
! Wandscheibe mit �ffnungen
! Einheiten: [kN],[m]
!========================================================
/nerr,0
*do,j,1,10,1
/com,
*enddo
/COM *** 5.2.2 ANSYS APDL ***
finish
/clear,start
/COM,ANSYS RELEASE 2020 R1           BUILD 20.1      UP20191203       15:49:58
/input,start,ans,'C:\Program Files\ANSYS Inc\v201\ANSYS\apdl\'
!-----------------
!Parameter
!-----------------
*SET,xStart , 0
*SET,yStart , 0
*SET,height , 8
*SET,width , 8
*SET,doorX , 1
*SET,doorY , 2
*SET,windW , 1.25
*SET,windH , 1.25
*SET,margin , 1
*SET,windMargin , 0.125
*SET,doorStep , 1
*SET,data , 0
*SET,meshsize , 0.125
*SET,verfein , 1
*SET,steps , 6
startVal=0
*dim, c,, steps,9, 1 ! Example Matrix
*SET,enow , 0
*do, ct, 1, steps
*do, ct2, 1, 10
*SET,c(ct,ct2) , startVal
*enddo
*enddo
! *** loop to restart the calculation ***
!------------------------------------------------
*do,door,1,steps,1
!!!!!!
!TEMP!
*SET,n , door
*SET,wind1X , 1
*SET,wind1Y , 4
*SET,wind2X , 5
*SET,wind2Y , 3
!-----------------
!Initialize Iter
!-----------------
parsav,all
finish
/clear,start
/COM,ANSYS RELEASE 2020 R1           BUILD 20.1      UP20191203       15:50:06
/input,start,ans,'C:\Program Files\ANSYS Inc\v201\ANSYS\apdl\'
parres
/prep7
!-----------------
! Saving initial Param
!-----------------
*SET,c(n,1) , door
*SET,c(n,2) , wind1X
*SET,c(n,3) , wind1Y
*SET,c(n,4) , wind2X
*SET,c(n,5) , wind2Y
!-----------------
!Create House
!-----------------
BLC4,xStart, yStart, width, height !House
BLC4,door,yStart, doorX, doorY !Door
BLC4,wind1X,wind1Y,windW,windH !Window
BLC4,wind2X,wind2Y,windW,windH !2nd Window
!Selecting and deleting the area of Door and the two windows
FLST,3,3,5,ORDE,2
FITEM,3,2
FITEM,3,-4
ASBA,       1,P51X
!-----------------
! Material
!-----------------
ET,1,PLANE182
KEYOPT,1,1,0
KEYOPT,1,3,3
KEYOPT,1,6,0
r,1,0.2
mp,ex,1,30000000
mp,prxy,1,0.2
dl,17,,all
dl,18,,all
sfl,3,pres,250000000
!-----------------
! Mesh
!-----------------
esize,meshsize
amesh,all
cpintf,all
FINISH
/SOL
solve
FINISH
/POST1
!-----------------
! Value at point 4,4
!-----------------
!!!!!!!!!!!!!!!!!!!!!!!!!!!!!!!!!!
! T O   D O !!!!!!!!!!!!!!!!!!!!!!
!!!!!!!!!!!!!!!!!!!!!!!!!!!!!!!!!!
!Checken ob wir wirklich die Lösung bekommen die wir wollen
! maximale Verschiebung bei 4,4
allsel
nsel,s,loc,x,4 !select
nsel,r,loc,y,4 !reselect
*get,u,NODE,NDNEXT(0),u,y
*SET,c(n,6) , u
!
*enddo
/COM,ANSYS RELEASE 2020 R1           BUILD 20.1      UP20191203       15:50:25
!!! Writes out Matrix to matlab
*dmat, exportmatrix, D, import, APDL, c ! export to matrix file
*export, exportmatrix, mmf, mytemp.mtx
! *** exit the programm ***
!------------------------------------------------
finish
!/exit
!========================================================
! Wandscheibe mit �ffnungen
! Einheiten: [kN],[m]
!========================================================
/nerr,0
*do,j,1,10,1
/com,
*enddo
/COM *** 5.2.2 ANSYS APDL ***
finish
/clear,start
/COM,ANSYS RELEASE 2020 R1           BUILD 20.1      UP20191203       15:55:53
/input,start,ans,'C:\Program Files\ANSYS Inc\v201\ANSYS\apdl\'
!-----------------
!Parameter
!-----------------
*SET,xStart , 0
*SET,yStart , 0
*SET,height , 8
*SET,width , 8
*SET,doorX , 1
*SET,doorY , 2
*SET,windW , 1.25
*SET,windH , 1.25
*SET,margin , 1
*SET,windMargin , 0.125
*SET,doorStep , 1
*SET,data , 0
*SET,meshsize , 0.125
*SET,verfein , 1
*SET,steps , 6
startVal=0
*dim, c,, steps,9, 1 ! Example Matrix
*SET,enow , 0
*do, ct, 1, steps
*do, ct2, 1, 10
*SET,c(ct,ct2) , startVal
*enddo
*enddo
*do,wind1X, xStart + margin, xStart + width - margin, 1
*SET,c(wind1X, 8) , wind1X
*enddo
! *** loop to restart the calculation ***
!------------------------------------------------
*do,door,1,steps,1
!!!!!!
!TEMP!
*SET,n , door
*SET,wind1X , 1
*SET,wind1Y , 4
*SET,wind2X , 5
*SET,wind2Y , 3
!-----------------
!Initialize Iter
!-----------------
parsav,all
finish
/clear,start
/COM,ANSYS RELEASE 2020 R1           BUILD 20.1      UP20191203       15:56:04
/input,start,ans,'C:\Program Files\ANSYS Inc\v201\ANSYS\apdl\'
parres
/prep7
!-----------------
! Saving initial Param
!-----------------
*SET,c(n,1) , door
*SET,c(n,2) , wind1X
*SET,c(n,3) , wind1Y
*SET,c(n,4) , wind2X
*SET,c(n,5) , wind2Y
!-----------------
!Create House
!-----------------
BLC4,xStart, yStart, width, height !House
BLC4,door,yStart, doorX, doorY !Door
BLC4,wind1X,wind1Y,windW,windH !Window
BLC4,wind2X,wind2Y,windW,windH !2nd Window
!Selecting and deleting the area of Door and the two windows
FLST,3,3,5,ORDE,2
FITEM,3,2
FITEM,3,-4
ASBA,       1,P51X
!-----------------
! Material
!-----------------
ET,1,PLANE182
KEYOPT,1,1,0
KEYOPT,1,3,3
KEYOPT,1,6,0
r,1,0.2
mp,ex,1,30000000
mp,prxy,1,0.2
dl,17,,all
dl,18,,all
sfl,3,pres,250000000
!-----------------
! Mesh
!-----------------
esize,meshsize
amesh,all
cpintf,all
FINISH
/SOL
solve
FINISH
/POST1
!-----------------
! Value at point 4,4
!-----------------
!!!!!!!!!!!!!!!!!!!!!!!!!!!!!!!!!!
! T O   D O !!!!!!!!!!!!!!!!!!!!!!
!!!!!!!!!!!!!!!!!!!!!!!!!!!!!!!!!!
!Checken ob wir wirklich die Lösung bekommen die wir wollen
! maximale Verschiebung bei 4,4
allsel
nsel,s,loc,x,4 !select
nsel,r,loc,y,4 !reselect
*get,u,NODE,NDNEXT(0),u,y
*SET,c(n,6) , u
!
*enddo
/COM,ANSYS RELEASE 2020 R1           BUILD 20.1      UP20191203       15:56:23
!!! Writes out Matrix to matlab
*dmat, exportmatrix, D, import, APDL, c ! export to matrix file
*export, exportmatrix, mmf, mytemp.mtx
! *** exit the programm ***
!------------------------------------------------
finish
!/exit
!========================================================
! Wandscheibe mit �ffnungen
! Einheiten: [kN],[m]
!========================================================
/nerr,0
*do,j,1,10,1
/com,
*enddo
/COM *** 5.2.2 ANSYS APDL ***
finish
/clear,start
/COM,ANSYS RELEASE 2020 R1           BUILD 20.1      UP20191203       15:59:48
/input,start,ans,'C:\Program Files\ANSYS Inc\v201\ANSYS\apdl\'
!-----------------
!Parameter
!-----------------
*SET,xStart , 0
*SET,yStart , 0
*SET,height , 8
*SET,width , 8
*SET,doorX , 1
*SET,doorY , 2
*SET,windW , 1.25
*SET,windH , 1.25
*SET,margin , 1
*SET,windMargin , 0.125
*SET,doorStep , 1
*SET,data , 0
*SET,meshsize , 0.125
*SET,verfein , 1
*SET,steps , 6
!*ask,startVal,Anfangswert,0
*SET,startVal , 0
*dim, c,, steps,9, 1 ! Example Matrix
*SET,enow , 0
*do, ct, 1, steps
*do, ct2, 1, 9
*SET,c(ct,ct2) , startVal
*enddo
*enddo
*do,wind1X, xStart + margin, xStart + width - margin, 1
*SET,c(wind1X, 8) , wind1X
*SET,c(7,7) , 10%6
*enddo
! *** loop to restart the calculation ***
!------------------------------------------------
*do,door,1,steps,1
!!!!!!
!TEMP!
*SET,n , door
*SET,wind1X , 1
*SET,wind1Y , 4
*SET,wind2X , 5
*SET,wind2Y , 3
!-----------------
!Initialize Iter
!-----------------
parsav,all
finish
/clear,start
/COM,ANSYS RELEASE 2020 R1           BUILD 20.1      UP20191203       15:59:58
/input,start,ans,'C:\Program Files\ANSYS Inc\v201\ANSYS\apdl\'
parres
/prep7
!-----------------
! Saving initial Param
!-----------------
*SET,c(n,1) , door
*SET,c(n,2) , wind1X
*SET,c(n,3) , wind1Y
*SET,c(n,4) , wind2X
*SET,c(n,5) , wind2Y
!-----------------
!Create House
!-----------------
BLC4,xStart, yStart, width, height !House
BLC4,door,yStart, doorX, doorY !Door
BLC4,wind1X,wind1Y,windW,windH !Window
BLC4,wind2X,wind2Y,windW,windH !2nd Window
!Selecting and deleting the area of Door and the two windows
FLST,3,3,5,ORDE,2
FITEM,3,2
FITEM,3,-4
ASBA,       1,P51X
!-----------------
! Material
!-----------------
ET,1,PLANE182
KEYOPT,1,1,0
KEYOPT,1,3,3
KEYOPT,1,6,0
r,1,0.2
mp,ex,1,30000000
mp,prxy,1,0.2
dl,17,,all
dl,18,,all
sfl,3,pres,250000000
!-----------------
! Mesh
!-----------------
esize,meshsize
amesh,all
cpintf,all
FINISH
/SOL
solve
FINISH
/POST1
!-----------------
! Value at point 4,4
!-----------------
!!!!!!!!!!!!!!!!!!!!!!!!!!!!!!!!!!
! T O   D O !!!!!!!!!!!!!!!!!!!!!!
!!!!!!!!!!!!!!!!!!!!!!!!!!!!!!!!!!
!Checken ob wir wirklich die Lösung bekommen die wir wollen
! maximale Verschiebung bei 4,4
allsel
nsel,s,loc,x,4 !select
nsel,r,loc,y,4 !reselect
*get,u,NODE,NDNEXT(0),u,y
*SET,c(n,6) , u
!
*enddo
/COM,ANSYS RELEASE 2020 R1           BUILD 20.1      UP20191203       16:00:16
!!! Writes out Matrix to matlab
*dmat, exportmatrix, D, import, APDL, c ! export to matrix file
*export, exportmatrix, mmf, mytemp.mtx
! *** exit the programm ***
!------------------------------------------------
finish
!/exit
!========================================================
! Wandscheibe mit �ffnungen
! Einheiten: [kN],[m]
!========================================================
/nerr,0
*do,j,1,10,1
/com,
*enddo
/COM *** 5.2.2 ANSYS APDL ***
finish
/clear,start
/COM,ANSYS RELEASE 2020 R1           BUILD 20.1      UP20191203       16:14:02
/input,start,ans,'C:\Program Files\ANSYS Inc\v201\ANSYS\apdl\'
!-----------------
!Parameter
!-----------------
*SET,xStart , 0
*SET,yStart , 0
*SET,height , 8
*SET,width , 8
*SET,doorX , 1
*SET,doorY , 2
*SET,windW , 1.25
*SET,windH , 1.25
*SET,margin , 1
*SET,windMargin , 0.125
*SET,doorStep , 1
*SET,data , 0
*SET,meshsize , 0.125
*SET,verfein , 1
*SET,steps , 6
!*ask,startVal,Anfangswert,0
*SET,startVal , 0
*dim, c,, steps,9, 1 ! Example Matrix
*SET,enow , 0
*do, ct, 1, steps
*do, ct2, 1, 9
*SET,c(ct,ct2) , startVal
*enddo
*enddo
*do,wind1X, xStart + margin, xStart + width - margin, 1
*SET,c(wind1X, 8) , wind1X
*SET,c(6,7) , 10%6
*enddo
! *** loop to restart the calculation ***
!------------------------------------------------
*do,door,1,steps,1
!!!!!!
!TEMP!
*SET,n , door
*SET,wind1X , 1
*SET,wind1Y , 4
*SET,wind2X , 5
*SET,wind2Y , 3
!-----------------
!Initialize Iter
!-----------------
parsav,all
finish
/clear,start
/COM,ANSYS RELEASE 2020 R1           BUILD 20.1      UP20191203       16:14:10
/input,start,ans,'C:\Program Files\ANSYS Inc\v201\ANSYS\apdl\'
parres
/prep7
!-----------------
! Saving initial Param
!-----------------
*SET,c(n,1) , door
*SET,c(n,2) , wind1X
*SET,c(n,3) , wind1Y
*SET,c(n,4) , wind2X
*SET,c(n,5) , wind2Y
!-----------------
!Create House
!-----------------
BLC4,xStart, yStart, width, height !House
BLC4,door,yStart, doorX, doorY !Door
BLC4,wind1X,wind1Y,windW,windH !Window
BLC4,wind2X,wind2Y,windW,windH !2nd Window
!Selecting and deleting the area of Door and the two windows
FLST,3,3,5,ORDE,2
FITEM,3,2
FITEM,3,-4
ASBA,       1,P51X
!-----------------
! Material
!-----------------
ET,1,PLANE182
KEYOPT,1,1,0
KEYOPT,1,3,3
KEYOPT,1,6,0
r,1,0.2
mp,ex,1,30000000
mp,prxy,1,0.2
dl,17,,all
dl,18,,all
sfl,3,pres,250000000
!-----------------
! Mesh
!-----------------
esize,meshsize
amesh,all
cpintf,all
FINISH
/SOL
solve
FINISH
/POST1
!-----------------
! Value at point 4,4
!-----------------
!!!!!!!!!!!!!!!!!!!!!!!!!!!!!!!!!!
! T O   D O !!!!!!!!!!!!!!!!!!!!!!
!!!!!!!!!!!!!!!!!!!!!!!!!!!!!!!!!!
!Checken ob wir wirklich die Lösung bekommen die wir wollen
! maximale Verschiebung bei 4,4
allsel
nsel,s,loc,x,4 !select
nsel,r,loc,y,4 !reselect
*get,u,NODE,NDNEXT(0),u,y
*SET,c(n,6) , u
!
*enddo
/COM,ANSYS RELEASE 2020 R1           BUILD 20.1      UP20191203       16:14:30
!!! Writes out Matrix to matlab
*dmat, exportmatrix, D, import, APDL, c ! export to matrix file
*export, exportmatrix, mmf, mytemp.mtx
! *** exit the programm ***
!------------------------------------------------
finish
!/exit
*SET,startVal , 3
*dim, c,, steps,9, 1 ! Example Matrix
*SET,enow , 0
*do, ct, 1, steps
*do, ct2, 1, 8
*SET,c(ct,ct2) , ct2%5
*SET,c(ct,9) , ct//startVal
*enddo
*enddo
!!! Writes out Matrix to matlab
*dmat, exportmatrix, D, import, APDL, c ! export to matrix file
*export, exportmatrix, mmf, mytemp.mtx
*SET,startVal , 3
*dim, c,, steps,9, 1 ! Example Matrix
*SET,enow , 0
*do, ct, 1, steps
*do, ct2, 1, 8
*SET,c(ct,ct2) , ct2%5
*SET,c(ct,9) , ct//startVal
*enddo
*enddo
!!! Writes out Matrix to matlab
*dmat, exportmatrix, D, import, APDL, c ! export to matrix file
*export, exportmatrix, mmf, mytemp.mtx
/CLEAR,NOSTART
/COM,ANSYS RELEASE 2020 R1           BUILD 20.1      UP20191203       16:45:59
*dim, c,, steps,9, 1 ! Example Matrix
*SET,enow , 0
*do, ct, 1, steps
*do, ct2, 1, 8
*SET,c(ct,ct2) , ct2%5
*SET,c(ct,9) , ct//startVal
*enddo
*enddo
!!! Writes out Matrix to matlab
*dmat, exportmatrix, D, import, APDL, c ! export to matrix file
*export, exportmatrix, mmf, mytemp.mtx
*SET,startVal , 3
*dim, c,, steps,9, 1 ! Example Matrix
*SET,enow , 0
*do, ct, 1, steps
*do, ct2, 1, 8
*SET,c(ct,ct2) , ct2%5
*SET,c(ct,9) , ct//startVal
*enddo
*enddo
!!! Writes out Matrix to matlab
*dmat, exportmatrix, D, import, APDL, c ! export to matrix file
*export, exportmatrix, mmf, mytemp.mtx
FINISH
! /EXIT,MODEL
