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/BATCH
/COM,ANSYS RELEASE 2020 R1           BUILD 20.1      UP20191203       18:02:46
/input,menust,tmp,''
/GST,ON
/PLO,INFO,3
/GRO,CURL,ON
/CPLANE,1
WPSTYLE,,,,,,,,0
/PREP7
/NOPR
KEYW,PR_SET,1
KEYW,PR_STRUC,1
KEYW,PR_THERM,0
KEYW,PR_FLUID,0
KEYW,PR_ELMAG,0
KEYW,MAGNOD,0
KEYW,MAGEDG,0
KEYW,MAGHFE,0
KEYW,MAGELC,0
KEYW,PR_MULTI,0
/GO
/COM,
/COM,Preferences for GUI filtering have been set to display:
/COM,  Structural
ET,1,PLANE182
KEYOPT,1,1,0
KEYOPT,1,3,3
KEYOPT,1,6,0
R,1,0.5,
MPTEMP,,,,,,,,
MPTEMP,1,0
MPDATA,EX,1,,3E7
MPDATA,PRXY,1,,0.2
FLST,2,5,8
FITEM,2,0,0,0
FITEM,2,0,8,0
FITEM,2,4,12,0
FITEM,2,8,8,0
FITEM,2,8,0,0
PRI2,P51X,0.0,0.0
BLC4,2,4,1.5,1.5
BLC4,4,2,1.5,1.5
BLC4,1,0,1,2
/NUMBER,0
FLST,3,3,5,ORDE,2
FITEM,3,2
FITEM,3,-4
ASBA,       1,P51X
ESIZE,0,100,
MSHAPE,0,2D
MSHKEY,0
FLST,2,1,5,ORDE,1
FITEM,2,5
AESIZE,P51X,100,
CM,_Y,AREA
ASEL, , , ,       5
CM,_Y1,AREA
CHKMSH,'AREA'
CMSEL,S,_Y
AMESH,_Y1
CMDELE,_Y
CMDELE,_Y1
CMDELE,_Y2
/NOPR   ! Suppress printing of UNDO process
/PMACRO ! Echo following commands to log
FINISH  ! Make sure we are at BEGIN level
/CLEAR,NOSTART  ! Clear model since no SAVE found
/COM,ANSYS RELEASE 2020 R1           BUILD 20.1      UP20191203       18:13:20
! WE SUGGEST YOU REMOVE THIS LINE AND THE FOLLOWING STARTUP LINES
/input,menust,tmp,''
/GST,ON
/PLO,INFO,3
/GRO,CURL,ON
/CPLANE,1
WPSTYLE,,,,,,,,0
/PREP7
/NOPR
KEYW,PR_SET,1
KEYW,PR_STRUC,1
KEYW,PR_THERM,0
KEYW,PR_FLUID,0
KEYW,PR_ELMAG,0
KEYW,MAGNOD,0
KEYW,MAGEDG,0
KEYW,MAGHFE,0
KEYW,MAGELC,0
KEYW,PR_MULTI,0
/GO
ET,1,PLANE182
KEYOPT,1,1,0
KEYOPT,1,3,3
KEYOPT,1,6,0
R,1,0.5,
MPTEMP,,,,,,,,
MPTEMP,1,0
MPDATA,EX,1,,3E7
MPDATA,PRXY,1,,0.2
FLST,2,5,8
FITEM,2,0,0,0
FITEM,2,0,8,0
FITEM,2,4,12,0
FITEM,2,8,8,0
FITEM,2,8,0,0
PRI2,P51X,0.0,0.0
BLC4,2,4,1.5,1.5
BLC4,4,2,1.5,1.5
BLC4,1,0,1,2
/NUMBER,0
FLST,3,3,5,ORDE,2
FITEM,3,2
FITEM,3,-4
ASBA,       1,P51X
ESIZE,0,100,
MSHAPE,0,2D
MSHKEY,0
FLST,2,1,5,ORDE,1
FITEM,2,5
AESIZE,P51X,100,
CM,_Y,AREA
ASEL, , , ,       5
CM,_Y1,AREA
CHKMSH,'AREA'
CMSEL,S,_Y
AMESH,_Y1
CMDELE,_Y
CMDELE,_Y1
CMDELE,_Y2
/NOPR   ! Suppress printing of UNDO process
/PMACRO ! Echo following commands to log
FINISH  ! Make sure we are at BEGIN level
/CLEAR,NOSTART  ! Clear model since no SAVE found
/COM,ANSYS RELEASE 2020 R1           BUILD 20.1      UP20191203       18:14:16
! WE SUGGEST YOU REMOVE THIS LINE AND THE FOLLOWING STARTUP LINES
/input,menust,tmp,''
/GST,ON
/PLO,INFO,3
/GRO,CURL,ON
/CPLANE,1
WPSTYLE,,,,,,,,0
/PREP7
/NOPR
KEYW,PR_SET,1
KEYW,PR_STRUC,1
KEYW,PR_THERM,0
KEYW,PR_FLUID,0
KEYW,PR_ELMAG,0
KEYW,MAGNOD,0
KEYW,MAGEDG,0
KEYW,MAGHFE,0
KEYW,MAGELC,0
KEYW,PR_MULTI,0
/GO
ET,1,PLANE182
KEYOPT,1,1,0
KEYOPT,1,3,3
KEYOPT,1,6,0
R,1,0.5,
MPTEMP,,,,,,,,
MPTEMP,1,0
MPDATA,EX,1,,3E7
MPDATA,PRXY,1,,0.2
FLST,2,5,8
FITEM,2,0,0,0
FITEM,2,0,8,0
FITEM,2,4,12,0
FITEM,2,8,8,0
FITEM,2,8,0,0
PRI2,P51X,0.0,0.0
BLC4,2,4,1.5,1.5
BLC4,4,2,1.5,1.5
BLC4,1,0,1,2
/NUMBER,0
FLST,3,3,5,ORDE,2
FITEM,3,2
FITEM,3,-4
ASBA,       1,P51X
ESIZE,0,100,
MSHAPE,0,2D
MSHKEY,0
FLST,2,1,5,ORDE,1
FITEM,2,5
AESIZE,P51X,100,
CM,_Y,AREA
ASEL, , , ,       5
CM,_Y1,AREA
CHKMSH,'AREA'
CMSEL,S,_Y
AMESH,_Y1
CMDELE,_Y
CMDELE,_Y1
CMDELE,_Y2
FINISH
/SOL
SAVE
FINISH
/POST1
FINISH
/PREP7
FINISH
/SOL
FLST,2,2,4,ORDE,2
FITEM,2,18
FITEM,2,-19
/GO
DL,P51X, ,ALL,0
FLST,2,2,4,ORDE,2
FITEM,2,2
FITEM,2,-3
/GO
SFL,P51X,PRES,50,
/STATUS,SOLU
/STATUS,SOLU
SOLVE
FINISH
/POST1
SET,LIST
PLDISP,1
/EFACET,1
PLNSOL, U,SUM, 0,1.0
/EFACET,1
PLNSOL, S,EQV, 0,1.0
/EFACET,1
PLNSOL, EPEL,EQV, 0,1.0
PLESOL, EPTO,X, 0,1.0
PLESOL, S,X, 0,1.0
/EFACET,1
PLNSOL, S,X, 0,1.0
/EFACET,1
PLNSOL, U,X, 0,1.0
/EFACET,1
PLNSOL, U,Y, 0,1.0
SAVE
FINISH
! /EXIT,ALL
/BATCH
/COM,ANSYS RELEASE 2020 R1           BUILD 20.1      UP20191203       13:01:38
/input,menust,tmp,''
/GST,ON
/PLO,INFO,3
/GRO,CURL,ON
/CPLANE,1
WPSTYLE,,,,,,,,0
RESUME,'simpleHouse','db','.'
/COM,ANSYS RELEASE 2020 R1           BUILD 20.1      UP20191203       13:02:27
/NOPR   ! Suppress printing of UNDO process
/PMACRO ! Echo following commands to log
FINISH  ! Make sure we are at BEGIN level
/CLEAR,NOSTART  ! Clear model since no SAVE found
/COM,ANSYS RELEASE 2020 R1           BUILD 20.1      UP20191203       13:03:56
! WE SUGGEST YOU REMOVE THIS LINE AND THE FOLLOWING STARTUP LINES
/input,menust,tmp,''
/GST,ON
/PLO,INFO,3
/GRO,CURL,ON
/CPLANE,1
WPSTYLE,,,,,,,,0
/PREP7
/NOPR
KEYW,PR_SET,1
KEYW,PR_STRUC,1
KEYW,PR_THERM,0
KEYW,PR_FLUID,0
KEYW,PR_ELMAG,0
KEYW,MAGNOD,0
KEYW,MAGEDG,0
KEYW,MAGHFE,0
KEYW,MAGELC,0
KEYW,PR_MULTI,0
/GO
ET,1,PLANE182
KEYOPT,1,1,0
KEYOPT,1,3,3
KEYOPT,1,6,0
R,1,0.5,
MPTEMP,,,,,,,,
MPTEMP,1,0
MPDATA,EX,1,,3E7
MPDATA,PRXY,1,,0.2
FLST,2,5,8
FITEM,2,0,0,0
FITEM,2,0,8,0
FITEM,2,4,12,0
FITEM,2,8,8,0
FITEM,2,8,0,0
PRI2,P51X,0.0,0.0
BLC4,2,4,1.5,1.5
BLC4,4,2,1.5,1.5
BLC4,1,0,1,2
/NUMBER,0
FLST,3,3,5,ORDE,2
FITEM,3,2
FITEM,3,-4
ASBA,       1,P51X
ESIZE,0,100,
MSHAPE,0,2D
MSHKEY,0
FLST,2,1,5,ORDE,1
FITEM,2,5
AESIZE,P51X,100,
CM,_Y,AREA
ASEL, , , ,       5
CM,_Y1,AREA
CHKMSH,'AREA'
CMSEL,S,_Y
AMESH,_Y1
CMDELE,_Y
CMDELE,_Y1
CMDELE,_Y2
/NOPR   ! Suppress printing of UNDO process
/PMACRO ! Echo following commands to log
FINISH  ! Make sure we are at BEGIN level
/CLEAR,NOSTART  ! Clear model since no SAVE found
/COM,ANSYS RELEASE 2020 R1           BUILD 20.1      UP20191203       13:07:04
! WE SUGGEST YOU REMOVE THIS LINE AND THE FOLLOWING STARTUP LINES
/input,menust,tmp,''
/GST,ON
/PLO,INFO,3
/GRO,CURL,ON
/CPLANE,1
WPSTYLE,,,,,,,,0
/PREP7
/NOPR
KEYW,PR_SET,1
KEYW,PR_STRUC,1
KEYW,PR_THERM,0
KEYW,PR_FLUID,0
KEYW,PR_ELMAG,0
KEYW,MAGNOD,0
KEYW,MAGEDG,0
KEYW,MAGHFE,0
KEYW,MAGELC,0
KEYW,PR_MULTI,0
/GO
ET,1,PLANE182
KEYOPT,1,1,0
KEYOPT,1,3,3
KEYOPT,1,6,0
R,1,0.5,
MPTEMP,,,,,,,,
MPTEMP,1,0
MPDATA,EX,1,,3E7
MPDATA,PRXY,1,,0.2
FLST,2,5,8
FITEM,2,0,0,0
FITEM,2,0,8,0
FITEM,2,4,12,0
FITEM,2,8,8,0
FITEM,2,8,0,0
PRI2,P51X,0.0,0.0
BLC4,2,4,1.5,1.5
BLC4,4,2,1.5,1.5
BLC4,1,0,1,2
/NUMBER,0
FLST,3,3,5,ORDE,2
FITEM,3,2
FITEM,3,-4
ASBA,       1,P51X
ESIZE,0,100,
MSHAPE,0,2D
MSHKEY,0
FLST,2,1,5,ORDE,1
FITEM,2,5
AESIZE,P51X,100,
CM,_Y,AREA
ASEL, , , ,       5
CM,_Y1,AREA
CHKMSH,'AREA'
CMSEL,S,_Y
AMESH,_Y1
CMDELE,_Y
CMDELE,_Y1
CMDELE,_Y2
FINISH
/SOL
FLST,2,2,4,ORDE,2
FITEM,2,18
FITEM,2,-19
/GO
DL,P51X, ,ALL,0
FLST,2,2,4,ORDE,2
FITEM,2,2
FITEM,2,-3
/GO
SFL,P51X,PRES,50,
/STATUS,SOLU
/STATUS,SOLU
SOLVE
FINISH
/POST1
SET,LIST
PLDISP,1
/EFACET,1
PLNSOL, U,SUM, 0,1.0
/EFACET,1
PLNSOL, S,EQV, 0,1.0
/EFACET,1
PLNSOL, EPEL,EQV, 0,1.0
PLESOL, EPTO,X, 0,1.0
PLESOL, S,X, 0,1.0
/EFACET,1
PLNSOL, S,X, 0,1.0
/EFACET,1
PLNSOL, U,X, 0,1.0
/NOPR   ! Suppress printing of UNDO process
/PMACRO ! Echo following commands to log
FINISH  ! Make sure we are at BEGIN level
/CLEAR,NOSTART  ! Clear model since no SAVE found
/COM,ANSYS RELEASE 2020 R1           BUILD 20.1      UP20191203       13:19:57
! WE SUGGEST YOU REMOVE THIS LINE AND THE FOLLOWING STARTUP LINES
/input,menust,tmp,''
/GST,ON
/PLO,INFO,3
/GRO,CURL,ON
/CPLANE,1
WPSTYLE,,,,,,,,0
/PREP7
/NOPR
KEYW,PR_SET,1
KEYW,PR_STRUC,1
KEYW,PR_THERM,0
KEYW,PR_FLUID,0
KEYW,PR_ELMAG,0
KEYW,MAGNOD,0
KEYW,MAGEDG,0
KEYW,MAGHFE,0
KEYW,MAGELC,0
KEYW,PR_MULTI,0
/GO
ET,1,PLANE182
KEYOPT,1,1,0
KEYOPT,1,3,3
KEYOPT,1,6,0
R,1,0.5,
! Model Parameter
MPTEMP,,,,,,,,
MPTEMP,1,0
MPDATA,EX,1,,3E7
MPDATA,PRXY,1,,0.2
! Creating the house
FLST,2,5,8
FITEM,2,0,0,0
FITEM,2,0,8,0
FITEM,2,4,12,0
FITEM,2,8,8,0
FITEM,2,8,0,0
PRI2,P51X,0.0,0.0
BLC4,2,4,1.5,1.5
BLC4,4,2,1.5,1.5
BLC4,1,0,1,2
/NUMBER,0
FLST,3,3,5,ORDE,2
FITEM,3,2
FITEM,3,-4
ASBA,       1,P51X
ESIZE,0,10, !10 was 100
MSHAPE,0,2D
MSHKEY,0
FLST,2,1,5,ORDE,1
FITEM,2,5
AESIZE,P51X,10,!10 was 100
CM,_Y,AREA
ASEL, , , ,       5
CM,_Y1,AREA
CHKMSH,'AREA'
CMSEL,S,_Y
AMESH,_Y1
CMDELE,_Y
CMDELE,_Y1
CMDELE,_Y2
FINISH
/SOL
FLST,2,2,4,ORDE,2
FITEM,2,18
FITEM,2,-19
/GO
DL,P51X, ,ALL,0
FLST,2,2,4,ORDE,2
FITEM,2,2
FITEM,2,-3
/GO
SFL,P51X,PRES,50,
/STATUS,SOLU
/STATUS,SOLU
SOLVE
FINISH
/POST1
SET,LIST
PLDISP,1
/EFACET,1
PLNSOL, U,SUM, 0,1.0
/EFACET,1
PLNSOL, S,EQV, 0,1.0
/EFACET,1
PLNSOL, EPEL,EQV, 0,1.0
PLESOL, EPTO,X, 0,1.0
PLESOL, S,X, 0,1.0
/EFACET,1
PLNSOL, S,X, 0,1.0
/EFACET,1
PLNSOL, U,X, 0,1.0
PRNSOL,S,PRIN
PRNSOL,U,COMP
FINISH
/CLEAR,NOSTART
/COM,ANSYS RELEASE 2020 R1           BUILD 20.1      UP20191203       13:42:10
/PREP7
ET,1,PLANE182
KEYOPT,1,1,0
KEYOPT,1,3,3
KEYOPT,1,6,0
R,1,0.5,
MPTEMP,,,,,,,,
MPTEMP,1,0
MPDATA,EX,1,,6E7
MPDATA,PRXY,1,,0.2
BLC4,0,0,8,8
BLC4,1,0,1,2
BLC4,5,5,1.5,1.5
BLC4,2.5,5,1.5,1.5
FLST,3,3,5,ORDE,2
FITEM,3,2
FITEM,3,-4
ASBA,       1,P51X
FLST,2,1,5,ORDE,1
FITEM,2,5
AESIZE,P51X,20,
AATT,       1,       1,   1,       0,
MSHAPE,0,2D
MSHKEY,0
CM,_Y,AREA
ASEL, , , ,       5
CM,_Y1,AREA
CHKMSH,'AREA'
CMSEL,S,_Y
AMESH,_Y1
CMDELE,_Y
CMDELE,_Y1
CMDELE,_Y2
FINISH
/SOL
FLST,2,2,4,ORDE,2
FITEM,2,17
FITEM,2,-18
/GO
DL,P51X, ,ALL,0
FLST,2,1,4,ORDE,1
FITEM,2,3
/GO
SFL,P51X,PRES,10,
/STATUS,SOLU
SOLVE
FINISH
/POST1
*cfopen,test.txt
*VWRITE, 'Temp:',nds(1),temps(1),adiv,
*VWRITE, 'Temp:',nds(1),temps(1),adiv,'Tree: ', 70
!**************************************************
!         ANSYS Introduction
!      Simon Bieber: 24.10.2020
!**************************************************
! Note: All (!) units are in [ kN, m, s ]
! clear data base
finish
/clear
/COM,ANSYS RELEASE 2020 R1           BUILD 20.1      UP20191203       14:41:16
/input,start,ans,'C:\Program Files\ANSYS Inc\v201\ANSYS\apdl\'
!=========================================================
! 1) Preprocessing
!=========================================================
! open preprocessors
/PREP7
! INPUT
! beam geometry
*SET,Lx,10.0
*SET,h,1.0
*SET,t,1.0
! element divisions
*SET,nele_x , 20
*SET,nele_y , 2
! material
*SET,E,10000   ! E-Modulus (Young's)
*SET,nu,0.3    ! Poisso-ratio
*SET,rho,0.250   ! density (kNs^2/m)
! define keypoints ("corners" of rectangle)
K,1,0,0         !=> command, #keypoint, X-Y-coordinates
K,2,Lx,0
K,3,Lx,h
K,4,0,h
! create surface with a set of keypoints
A,1,2,3,4       !=> command, set of keypoints
! element type (4-noded plane element with 2 dofs for X and Y disp)
ET,1,plane182      !=>  command, #element, element name
KEYOPT,1,1,2         !1=#element, 1=#keyopt, 2= enhanced assumed strain
KEYOPT,1,3,2         !1=#element, 3=#keyopt, 2= plane strain
! ALTERNATIV: ET, ITYPE, Ename, KOP1, KOP2, KOP3, KOP4, KOP5, KOP6
! E.g.: ET,1,plane182,2,,2
! material
MP,EX,1,E        ! E modulus
MP,PRXY,1,nu     ! Poisson-ratio
! meshing size / ele dvisions
LESIZE,1,,,nele_x                         ! line ,,, element divisions
LESIZE,3,,,nele_x
LESIZE,2,,,nele_y
LESIZE,4,,,nele_y
! mesh
AMAP,1,1,2,3,4                      ! mesh based on area corners (def. by keypoints)
! end preprocesser
FINI
!=========================================================
! 2) Solution: linear analysis
!=========================================================
! Enter the solution processor
/SOLU
! Analysis type
ANTYPE,0  !0=performs a static analysis (0=default)
! disp boundary conditions (Dirichtlet)
DL,4,,all,0     ! fix als displacements on Line 4
! force boundary conditions (Neumann)
F,2,FY,-5  ! force at node 2 in y-direction, value=-5*h^3
SOLVE
!=========================================================
! 3) Postprocessing
!=========================================================
! open postrocessors
FINISH
/POST1
! plot deformed shape
/DSCALE,1,1        ! scale the deformation plot
PLDISP,2           ! plot deformed configuration
! plot stress
!PLESOL, S,X
! path
! vertical (from point x1/y1=0/0 to x2/y2=0/h)
path,Path_vertical,2,,1000
ppath,1,,0,0
ppath,2,,0,h
! interpolate and plot stress onto path
! (NOAV=do not average element results)
! normal stress
!pdef,SigmaX,S,X,NOAV
!plpagm,SigmaX,15,node
! shear stress
!pdef,SigmaXY,S,XY,NOAV
!plpagm,SigmaXY,15,node
*cfopen,test.txt
*VWrite, 'Something'
*cfc
FINISH
/SOL
FINISH
/POST1
PLDISP,0
PLDISP,2
/EFACET,1
PLNSOL, U,SUM, 0,1.0
/EFACET,1
PLNSOL, U,X, 0,1.0
/EFACET,1
PLNSOL, U,Y, 0,1.0
SET,FIRST
SET,FIRST
SET,FIRST
SET,NEXT
SET,PREVIOUS
SET,LAST
SET,LIST,999
SET,,, ,,, ,1
SET,,, ,,, ,1
SET,,, ,,, ,1
SET,,, ,,, ,1
SET,LIST,999
SET, , ,1, , , ,1,
SET,NEXT
SET,FIRST
SET,LIST,2
PRITER
PRERR
PRNSOL,U,X
*SET,adiv , '  |  '
*cfopen, test.txt
*VWRITE,'UX: ', UX, adiv, 'UY: ', UY
! (5A)
*cfclose
PRESOL,S,COMP
PRESOL,S,COMP
/NOPR
KEYW,PR_SET,1
KEYW,PR_STRUC,1
KEYW,PR_THERM,0
KEYW,PR_FLUID,0
KEYW,PR_ELMAG,0
KEYW,MAGNOD,0
KEYW,MAGEDG,0
KEYW,MAGHFE,0
KEYW,MAGELC,0
KEYW,PR_MULTI,0
/GO
/COM,
/COM,Preferences for GUI filtering have been set to display:
/COM,  Structural
FINISH
/PREP7
/NOPR   ! Suppress printing of UNDO process
/PMACRO ! Echo following commands to log
FINISH  ! Make sure we are at BEGIN level
/CLEAR,NOSTART  ! Clear model since no SAVE found
/COM,ANSYS RELEASE 2020 R1           BUILD 20.1      UP20191203       15:07:03
! WE SUGGEST YOU REMOVE THIS LINE AND THE FOLLOWING STARTUP LINES
/input,menust,tmp,''
/GST,ON
/PLO,INFO,3
/GRO,CURL,ON
/CPLANE,1
WPSTYLE,,,,,,,,0
/PREP7
/NOPR
KEYW,PR_SET,1
KEYW,PR_STRUC,1
KEYW,PR_THERM,0
KEYW,PR_FLUID,0
KEYW,PR_ELMAG,0
KEYW,MAGNOD,0
KEYW,MAGEDG,0
KEYW,MAGHFE,0
KEYW,MAGELC,0
KEYW,PR_MULTI,0
/GO
ET,1,PLANE182
KEYOPT,1,1,0
KEYOPT,1,3,3
KEYOPT,1,6,0
R,1,0.5,
! Model Parameter
MPTEMP,,,,,,,,
MPTEMP,1,0
MPDATA,EX,1,,3E7
MPDATA,PRXY,1,,0.2
! Creating the house
FLST,2,5,8
FITEM,2,0,0,0
FITEM,2,0,8,0
FITEM,2,4,12,0
FITEM,2,8,8,0
FITEM,2,8,0,0
PRI2,P51X,0.0,0.0
BLC4,2,4,1.5,1.5
BLC4,4,2,1.5,1.5
BLC4,1,0,1,2
/NUMBER,0
FLST,3,3,5,ORDE,2
FITEM,3,2
FITEM,3,-4
ASBA,       1,P51X
FINISH
/SOL
FINISH
/PREP7
MSHAPE,0,2D
MSHKEY,1
AMAP,5,9,6,7,8
AMAP,5,4,2,1,5
AMAP,5,5,14,17,4
AMAP,5,16,6,7,13
CM,_Y,AREA
ASEL, , , ,       5
CM,_Y1,AREA
CMSEL,S,_Y
CMSEL,S,_Y1
AATT,       1,       1,   1,       0,
CMSEL,S,_Y
CMDELE,_Y
CMDELE,_Y1
MSHAPE,1,2D
CM,_Y,AREA
ASEL, , , ,       5
CM,_Y1,AREA
CHKMSH,'AREA'
CMSEL,S,_Y
AMESH,_Y1
CMDELE,_Y
CMDELE,_Y1
CMDELE,_Y2
MSHAPE,0,2D
CM,_Y,AREA
ASEL, , , ,       5
CM,_Y1,AREA
CHKMSH,'AREA'
CMSEL,S,_Y
AMESH,_Y1
CMDELE,_Y
CMDELE,_Y1
CMDELE,_Y2
FLST,3,83,8
FITEM,3,0,0,0
FITEM,3,0,1,0
FITEM,3,0,2,0
FITEM,3,0,3,0
FITEM,3,0,4,0
FITEM,3,0,5,0
FITEM,3,0,6,0
FITEM,3,0,7,0
FITEM,3,0,8,0
FITEM,3,1,1,0
FITEM,3,1,2,0
FITEM,3,1,0,0
FITEM,3,1,3,0
FITEM,3,1,4,0
FITEM,3,1,5,0
FITEM,3,1,6,0
FITEM,3,1,7,0
FITEM,3,1,8,0
FITEM,3,2,0,0
FITEM,3,2,1,0
FITEM,3,2,2,0
FITEM,3,2,3,0
FITEM,3,2,4,0
FITEM,3,2,5,0
FITEM,3,2,6,0
FITEM,3,2,7,0
FITEM,3,2,8,0
FITEM,3,2,9,0
FITEM,3,2,9,0
FITEM,3,3,0,0
FITEM,3,3,1,0
FITEM,3,3,2,0
FITEM,3,3,3,0
FITEM,3,3,4,0
FITEM,3,3,5,0
FITEM,3,3,6,0
FITEM,3,3,7,0
FITEM,3,3,8,0
FITEM,3,4,0,0
FITEM,3,4,1,0
FITEM,3,4,2,0
FITEM,3,4,3,0
FITEM,3,4,4,0
FITEM,3,4,5,0
FITEM,3,4,6,0
FITEM,3,4,7,0
FITEM,3,4,8,0
FITEM,3,5,0,0
FITEM,3,5,1,0
FITEM,3,5,2,0
FITEM,3,5,3,0
FITEM,3,5,4,0
FITEM,3,5,5,0
FITEM,3,5,6,0
FITEM,3,5,7,0
FITEM,3,5,8,0
FITEM,3,6,0,0
FITEM,3,6,1,0
FITEM,3,6,2,0
FITEM,3,6,3,0
FITEM,3,6,4,0
FITEM,3,6,5,0
FITEM,3,6,6,0
FITEM,3,6,7,0
FITEM,3,6,8,0
FITEM,3,7,0,0
FITEM,3,7,1,0
FITEM,3,7,2,0
FITEM,3,7,3,0
FITEM,3,7,4,0
FITEM,3,7,5,0
FITEM,3,7,6,0
FITEM,3,7,7,0
FITEM,3,7,8,0
FITEM,3,8,0,0
FITEM,3,8,1,0
FITEM,3,8,2,0
FITEM,3,8,3,0
FITEM,3,8,4,0
FITEM,3,8,5,0
FITEM,3,8,6,0
FITEM,3,8,7,0
FITEM,3,8,8,0
K, ,P51X
KATT,       1,       1,   1,       0
FLST,5,100,3,ORDE,2
FITEM,5,1
FITEM,5,-100
CM,_Y,KP
KSEL, , , ,P51X
CM,_Y1,KP
CMSEL,S,_Y
CMSEL,S,_Y1
KATT,       1,       1,   1,       0
CMSEL,S,_Y
CMDELE,_Y
CMDELE,_Y1
KPLOT
APLOT
KPLOT
FLST,2,100,3,ORDE,2
FITEM,2,1
FITEM,2,-100
KMESH,P51X
FLST,2,100,3,ORDE,2
FITEM,2,1
FITEM,2,-100
KMESH,P51X
/NOPR   ! Suppress printing of UNDO process
/PMACRO ! Echo following commands to log
FINISH  ! Make sure we are at BEGIN level
/CLEAR,NOSTART  ! Clear model since no SAVE found
/COM,ANSYS RELEASE 2020 R1           BUILD 20.1      UP20191203       15:19:11
! WE SUGGEST YOU REMOVE THIS LINE AND THE FOLLOWING STARTUP LINES
/input,menust,tmp,''
/GST,ON
/PLO,INFO,3
/GRO,CURL,ON
/CPLANE,1
WPSTYLE,,,,,,,,0
/PREP7
/NOPR
KEYW,PR_SET,1
KEYW,PR_STRUC,1
KEYW,PR_THERM,0
KEYW,PR_FLUID,0
KEYW,PR_ELMAG,0
KEYW,MAGNOD,0
KEYW,MAGEDG,0
KEYW,MAGHFE,0
KEYW,MAGELC,0
KEYW,PR_MULTI,0
/GO
ET,1,PLANE182
KEYOPT,1,1,0
KEYOPT,1,3,3
KEYOPT,1,6,0
R,1,0.5,
! Model Parameter
MPTEMP,,,,,,,,
MPTEMP,1,0
MPDATA,EX,1,,3E7
MPDATA,PRXY,1,,0.2
! Creating the house
FLST,2,5,8
FITEM,2,0,0,0
FITEM,2,0,8,0
FITEM,2,4,12,0
FITEM,2,8,8,0
FITEM,2,8,0,0
PRI2,P51X,0.0,0.0
BLC4,2,4,1.5,1.5
BLC4,4,2,1.5,1.5
BLC4,1,0,1,2
/NUMBER,0
FLST,3,3,5,ORDE,2
FITEM,3,2
FITEM,3,-4
ASBA,       1,P51X
ESIZE,0,10, !10 was 100
MSHAPE,0,2D
MSHKEY,0
FLST,2,1,5,ORDE,1
FITEM,2,5
AESIZE,P51X,10,!10 was 100
CM,_Y,AREA
ASEL, , , ,       5
CM,_Y1,AREA
CHKMSH,'AREA'
CMSEL,S,_Y
AMESH,_Y1
CMDELE,_Y
CMDELE,_Y1
CMDELE,_Y2
FINISH
/SOL
FLST,2,2,4,ORDE,2
FITEM,2,18
FITEM,2,-19
/GO
DL,P51X, ,ALL,0
FLST,2,2,4,ORDE,2
FITEM,2,2
FITEM,2,-3
/GO
SFL,P51X,PRES,50,
/STATUS,SOLU
/STATUS,SOLU
SOLVE
FINISH
/POST1
SET,LIST
PLDISP,1
/EFACET,1
PLNSOL, U,SUM, 0,1.0
/EFACET,1
PLNSOL, S,EQV, 0,1.0
/EFACET,1
PLNSOL, EPEL,EQV, 0,1.0
PLESOL, EPTO,X, 0,1.0
PLESOL, S,X, 0,1.0
/EFACET,1
PLNSOL, S,X, 0,1.0
/EFACET,1
PLNSOL, U,X, 0,1.0
NPLOT
FSUM,0,ALL
SPOINT,     259
SUCR,interpol,CPLANE,1,
SET,FIRST
SET,NEXT
SET,LIST,999
SET,,, ,,, ,1
APLOT
/NOPR   ! Suppress printing of UNDO process
/PMACRO ! Echo following commands to log
FINISH  ! Make sure we are at BEGIN level
/CLEAR,NOSTART  ! Clear model since no SAVE found
/COM,ANSYS RELEASE 2020 R1           BUILD 20.1      UP20191203       15:23:37
! WE SUGGEST YOU REMOVE THIS LINE AND THE FOLLOWING STARTUP LINES
/input,menust,tmp,''
/GST,ON
/PLO,INFO,3
/GRO,CURL,ON
/CPLANE,1
WPSTYLE,,,,,,,,0
/PREP7
/NOPR
KEYW,PR_SET,1
KEYW,PR_STRUC,1
KEYW,PR_THERM,0
KEYW,PR_FLUID,0
KEYW,PR_ELMAG,0
KEYW,MAGNOD,0
KEYW,MAGEDG,0
KEYW,MAGHFE,0
KEYW,MAGELC,0
KEYW,PR_MULTI,0
/GO
ET,1,PLANE182
KEYOPT,1,1,0
KEYOPT,1,3,3
KEYOPT,1,6,0
R,1,0.5,
! Model Parameter
MPTEMP,,,,,,,,
MPTEMP,1,0
MPDATA,EX,1,,3E7
MPDATA,PRXY,1,,0.2
! Creating the house
FLST,2,5,8
FITEM,2,0,0,0
FITEM,2,0,8,0
FITEM,2,4,12,0
FITEM,2,8,8,0
FITEM,2,8,0,0
PRI2,P51X,0.0,0.0
BLC4,2,4,1.5,1.5
BLC4,4,2,1.5,1.5
BLC4,1,0,1,2
/NUMBER,0
FLST,3,3,5,ORDE,2
FITEM,3,2
FITEM,3,-4
ASBA,       1,P51X
ESIZE,0,10, !10 was 100
MSHAPE,0,2D
MSHKEY,0
FLST,2,1,5,ORDE,1
FITEM,2,5
AESIZE,P51X,10,!10 was 100
CM,_Y,AREA
ASEL, , , ,       5
CM,_Y1,AREA
CHKMSH,'AREA'
CMSEL,S,_Y
AMESH,_Y1
CMDELE,_Y
CMDELE,_Y1
CMDELE,_Y2
FINISH
/SOL
FLST,2,2,4,ORDE,2
FITEM,2,18
FITEM,2,-19
/GO
DL,P51X, ,ALL,0
FLST,2,2,4,ORDE,2
FITEM,2,2
FITEM,2,-3
/GO
SFL,P51X,PRES,50,
/STATUS,SOLU
/STATUS,SOLU
SOLVE
FINISH
/POST1
SET,LIST
PLDISP,1
/EFACET,1
PLNSOL, U,SUM, 0,1.0
/EFACET,1
PLNSOL, S,EQV, 0,1.0
/EFACET,1
PLNSOL, EPEL,EQV, 0,1.0
PLESOL, EPTO,X, 0,1.0
PLESOL, S,X, 0,1.0
/EFACET,1
PLNSOL, S,X, 0,1.0
/EFACET,1
PLNSOL, U,X, 0,1.0
FINISH
/SOL
FINISH
/POST1
/SHOW,WIN32C
SET,FIRST
/PLOPTS,INFO,3
/CONTOUR,ALL,18
/NUMBER,1
PLNSOL,S,X
PLDI, ,
ANMODE,10,0.5, ,0
PLDISP,1
ANDSCL,10,0.25
PRNSOL,S,COMP
PLNSOL,S,EQV
PLNSOL,S,EQV
PLNSOL,S,EQV
PLNSOL,S,EQV
PLNSOL,S,EQV
PLNSOL,S,EQV
PLDISP,2
! /UIS,ABORT,1
/SHOW,WIN32
/SHOW,WIN32C
SET,FIRST
/PLOPTS,INFO,3
/NUMBER,1
PLDISP,2
PLDISP,2
*CSET,1,2,2
PLNSOL,U,X
ANCNTR,10,0.5
/ANFILE,SAVE,'xStress','anim','//stud.uni-stuttgart.de/users/st/st166934/Eigene Dateien/GitHub/NNStatikProjektarbeit/Projektarbeit/Dokumentation/Ergebnisse/03.11.2021'
PLNSOL,U,X
ANCNTR,10,0.5
eplot
PLDISP,1
ANDSCL,10,0.25
/ANFILE,SAVE,'vecSumDisplacement','anim','//stud.uni-stuttgart.de/users/st/st166934/Eigene Dateien/GitHub/NNStatikProjektarbeit/Projektarbeit/Ansys/Environment'
SET,LIST,2
! /UIS,ABORT,1
/SHOW,WIN32
RSYS,0
AVPRIN,0
AVRES,2,
/EFACET,1
LAYER,0
FORCE,TOTAL
RSYS,0
AVPRIN,0
AVRES,2,
/EFACET,1
LAYER,0
FORCE,TOTAL
RAPPND,1, ,
FINISH
/PREP7
FINISH
/AUX12
FINISH
/AUX12
*SET,_z1,1,
*SET,_z2,'DOMINANT'
VTYPE,0, ,
MPRINT,1
WRITE,test.txt
FINISH
/POST26
FILE,'simpleHouse','rst','.'
NUMVAR,200
SOLU,191,NCMIT
STORE,MERGE
FILLDATA,191,,,,1,1
REALVAR,191,191
NUMVAR,200
FILLDATA,191,,,,1,1
REALVAR,191,191
NSOL,2,192,U,X, UX_2,
STORE,MERGE
NUMVAR,200
FILLDATA,191,,,,1,1
REALVAR,191,191
VARDEL,2
FINISH
/POST1
SET,LIST
INRES,ALL
FILE,
SET,LIST
SET,LIST
/EFACET,1
PLNSOL, U,SUM, 0,1.0
PLESOL, S,X, 0,1.0
/EFACET,1
PLNSOL, U,SUM, 0,1.0
/EFACET,1
PLNSOL, S,X, 0,1.0
PLESOL, S,X, 0,1.0
PLETAB, ,AVG
SET,LIST,2
PRITER
PRERR
NSORT,U,X,0,0, ,0
PRNSOL,U,X
! EMATWRITE,YES
fini
! \solu
/SOLU
SOLUTION
EMATWRITE,Yes
!
FINISH
/AUX2
FORM,RECO
FILEAUX2, , ,
DUMP,ALL
FINISH
!**************************************************
!         ANSYS Introduction
!      Simon Bieber: 24.10.2020
!**************************************************
! Note: All (!) units are in [ kN, m, s ]
! clear data base
finish
/clear
/COM,ANSYS RELEASE 2020 R1           BUILD 20.1      UP20191203       16:11:32
/input,start,ans,'C:\Program Files\ANSYS Inc\v201\ANSYS\apdl\'
!=========================================================
! 1) Preprocessing
!=========================================================
! open preprocessors
/PREP7
! INPUT
! beam geometry
*SET,Lx,10.0
*SET,h,1.0
*SET,t,1.0
! element divisions
*SET,nele_x , 20
*SET,nele_y , 2
! material
*SET,E,10000   ! E-Modulus (Young's)
*SET,nu,0.3    ! Poisso-ratio
*SET,rho,0.250   ! density (kNs^2/m)
! define keypoints ("corners" of rectangle)
K,1,0,0         !=> command, #keypoint, X-Y-coordinates
K,2,Lx,0
K,3,Lx,h
K,4,0,h
! create surface with a set of keypoints
A,1,2,3,4       !=> command, set of keypoints
! element type (4-noded plane element with 2 dofs for X and Y disp)
ET,1,plane182      !=>  command, #element, element name
KEYOPT,1,1,2         !1=#element, 1=#keyopt, 2= enhanced assumed strain
KEYOPT,1,3,2         !1=#element, 3=#keyopt, 2= plane strain
! ALTERNATIV: ET, ITYPE, Ename, KOP1, KOP2, KOP3, KOP4, KOP5, KOP6
! E.g.: ET,1,plane182,2,,2
! material
MP,EX,1,E        ! E modulus
MP,PRXY,1,nu     ! Poisson-ratio
! meshing size / ele dvisions
LESIZE,1,,,nele_x                         ! line ,,, element divisions
LESIZE,3,,,nele_x
LESIZE,2,,,nele_y
LESIZE,4,,,nele_y
! mesh
AMAP,1,1,2,3,4                      ! mesh based on area corners (def. by keypoints)
! end preprocesser
FINI
!=========================================================
! 2) Solution: linear analysis
!=========================================================
! Enter the solution processor
/SOLU
! Analysis type
ANTYPE,0  !0=performs a static analysis (0=default)
! disp boundary conditions (Dirichtlet)
DL,4,,all,0     ! fix als displacements on Line 4
! force boundary conditions (Neumann)
F,2,FY,-5  ! force at node 2 in y-direction, value=-5*h^3
SOLVE
!=========================================================
! 3) Postprocessing
!=========================================================
! open postrocessors
FINISH
/POST1
! plot deformed shape
/DSCALE,1,1        ! scale the deformation plot
PLDISP,2           ! plot deformed configuration
! plot stress
!PLESOL, S,X
! path
! vertical (from point x1/y1=0/0 to x2/y2=0/h)
path,Path_vertical,2,,1000
ppath,1,,0,0
ppath,2,,0,h
! interpolate and plot stress onto path
! (NOAV=do not average element results)
! normal stress
!pdef,SigmaX,S,X,NOAV
!plpagm,SigmaX,15,node
! shear stress
!pdef,SigmaXY,S,XY,NOAV
!plpagm,SigmaXY,15,node
PRETAB,
PRVECT,U
PATH,PATH_VER
PRPATH,
/SHOW,WIN32C
SET,FIRST
/PLOPTS,INFO,3
/CONTOUR,ALL,18
/NUMBER,1
PLNSOL,U,X
SET,LIST,2
! /UIS,ABORT,1
/SHOW,WIN32
FSUM,0,ALL
NFORCE,ALL
/NUMBER,1
APLOT
/NUMBER,1
/NUMBER,1
LPLOT
/SHOW,WIN32C
SET,FIRST
/PLOPTS,INFO,3
/NUMBER,1
PLNSOL,NL,PSV
PLNSOL,EPEL,X
PLNSOL,S,3
PLNSOL,S,2
PLNSOL,S,1
PLNSOL,S,XZ
PLNSOL,S,YZ
PLNSOL,S,XY
PLNSOL,S,Z
PLNSOL,S,INT
PLNSOL,S,EQV
PLNSOL,NL,SEPL
PLDISP,1
ANDSCL,100,0.5E-01
eplot
! /UIS,ABORT,1
/SHOW,WIN32
/SHOW,WIN32C
SET,FIRST
/PLOPTS,INFO,3
/NUMBER,1
PLNSOL,U,SUM
! /UIS,ABORT,1
/SHOW,WIN32
INRES,ESOL
FILE,
SET,LIST
PARSAV,ALL,'test','txt',' '
*CREATE,ansuitmp
*CFOPEN,'test','txt',' '
*VWRITE,UX, , , , , , , , ,
(4F6.0)
*CFCLOS
*END
/INPUT,ansuitmp
*CREATE,ansuitmp
*CFOPEN,'test','txt',' '
*VWRITE,UX, , , , , , , , ,
%G
*CFCLOS
*END
/INPUT,ansuitmp
*CREATE,ansuitmp
*CFOPEN,'test','txt',' '
*VWRITE,UY, , , , , , , , ,
%G
*CFCLOS
*END
/INPUT,ansuitmp
FINISH
! /EXIT,NOSAV
/BATCH
/COM,ANSYS RELEASE 2020 R1           BUILD 20.1      UP20191203       12:12:46
/input,menust,tmp,''
/GST,ON
/PLO,INFO,3
/GRO,CURL,ON
/CPLANE,1
WPSTYLE,,,,,,,,0
/POST1
FINISH
! /EXIT,NOSAV
