!========================================================
! Wandscheibe mit �ffnungen
! Einheiten: [kN],[m]
!========================================================


/nerr,0

*do,j,1,10,1
/com,
*enddo
/COM *** 5.2.2 ANSYS APDL ***

finish
/clear,start


!-----------------
!Parameter
!-----------------

xStart = 0
yStart = 0
height = 8
width = 8
doorX = 1
doorY = 2
windW = 1.25
windH = 1.25
margin = 1
windMargin = 0.125
doorStep = 1
data = 0

meshsize = 0.125
verfein = 1
steps = 6


!*ask,startVal,Anfangswert,0
startVal = 0

*dim, c,, steps,9, 1 ! Example Matrix
enow = 0
*do, ct, 1, steps
    *do, ct2, 1, 9
        c(ct,ct2) = startVal
    *enddo
*enddo

*do,wind1X, xStart + margin, xStart + width - margin, 1
    c(wind1X, 8) = wind1X
    c(6,7) = 10%6
*enddo

! *** loop to restart the calculation ***
!------------------------------------------------
*do,door,1,steps,1

!!!!!!
!TEMP!
n = door
wind1X = 1
wind1Y = 4
wind2X = 5
wind2Y = 3


!-----------------
!Initialize Iter
!-----------------
parsav,all
finish
/clear,start
parres

/prep7

!-----------------
! Saving initial Param
!-----------------
c(n,1) = door
c(n,2) = wind1X
c(n,3) = wind1Y
c(n,4) = wind2X
c(n,5) = wind2Y


!-----------------
!Create House
!-----------------
BLC4,xStart, yStart, width, height !House
BLC4,door,yStart, doorX, doorY !Door
BLC4,wind1X,wind1Y,windW,windH !Window
BLC4,wind2X,wind2Y,windW,windH !2nd Window

!Selecting and deleting the area of Door and the two windows
FLST,3,3,5,ORDE,2
FITEM,3,2
FITEM,3,-4
ASBA,       1,P51X


!-----------------
! Material
!-----------------
ET,1,PLANE182
KEYOPT,1,1,0
KEYOPT,1,3,3
KEYOPT,1,6,0

r,1,0.2

mp,ex,1,30000000
mp,prxy,1,0.2

dl,17,,all
dl,18,,all
sfl,3,pres,250000000

!-----------------
! Mesh
!-----------------
esize,meshsize
amesh,all
cpintf,all

/solu
solve

/post1

!-----------------
! Value at point 4,4
!-----------------
!!!!!!!!!!!!!!!!!!!!!!!!!!!!!!!!!!
! T O   D O !!!!!!!!!!!!!!!!!!!!!!
!!!!!!!!!!!!!!!!!!!!!!!!!!!!!!!!!!
!Checken ob wir wirklich die Lösung bekommen die wir wollen
! maximale Verschiebung bei 4,4
allsel
nsel,s,loc,x,4 !select
nsel,r,loc,y,4 !reselect
*get,u,NODE,NDNEXT(0),u,y
c(n,6) = u

!


*enddo


!!! Writes out Matrix to matlab
*dmat, exportmatrix, D, import, APDL, c ! export to matrix file
*export, exportmatrix, mmf, mytemp.mtx


! *** exit the programm ***
!------------------------------------------------
finish
!/exit
