!################################################
!### Projektarbeit Jonathan Schnitzler     ######
!### Datengenerierung für Neuronales Netz  ######
!################################################


!##############
!## T O  D O ##
!##############
!
! - Generalisierung vervollständigen
!    o Länge und Breite des Grids zur Fensterabzählung ergänzen
!
!
!
! - Auswertungspunkte Verbessern
!
!
!
!##############


!################################################
!##            Start des Programms             ##
!################################################

/nerr,0

*do,j,1,10,1
/com,
*enddo
/COM *** 5.2.2 ANSYS APDL ***

finish
/clear,start


!-----------------
!Parameter
!-----------------

xStart = 0
yStart = 0
height = 8
width = 8
margin = 1

!Critical Point
xC = 4
yC = 4

!Door
doorW = 1
doorH = 2

!Window
windW = 1.25
windH = 1.25
windMargin = 0.125

	!Helping Variables
	ww = windW + 2 * windMargin
	wh = windH + 2 * windMargin
	!For House
	rw = width - 2 * margin
	rh = height - margin


n = 0
meshsize = 0.1

tries = 100


! Creating Matrix
size = 100 !steps * (maxWStep+1)*maxWStep /2
nParam = 10

*dim, c,, size,nParam, 1

!############################################
!## Loop over random positions ##
!############################################

*do,data,1,tries,1

!#### R A N D O M

doorX = rand(margin, rw-doorW)
windX1 = rand(margin,rw-ww)
windY1 = rand(0,rh-wh)
windX2 = rand(margin,rw-ww)
windY2 = rand(0,rh-wh)

!#### V A L I D A T E
!--------------------------------------------------------
!window in door 2x
*IF,windX1+windW,gt,doorX,and,windX1,lt,doorX+doorW,cycle
*IF,windX2+windW,gt,doorX,and,windX2,lt,doorX+doorW,cycle
!--------------------------------------------------------
!crit in window 2x
!--------------------------------------------------------
bool = 0
*IF,windX1,le,xC,and,xC, le, windX1 + windW
	bool = bool + 1
*ENDIF
*IF, windY1,le,yC,and,xC,le,windY1 + windH
	bool = bool + 1
*ENDIF
*IF,bool,gt,2,cycle
!!!!!!!
bool = 0
*IF,windX2,le,xC,and,xC, le, windX2 + windW
	bool = bool + 1
*ENDIF
*IF, windY2,le,yC,and,xC,le,windY2 + windH
	bool = bool + 1
*ENDIF
*IF,bool,gt,2,cycle
!--------------------------------------------------------
!window in window
!--------------------------------------------------------
bool = 0
boolF = 0
!!!! Corner x2,y2
*IF,windX1,le,windX2,and,windX2, le, windX1 + windW
	bool = bool + 1
*ENDIF
*IF, windY1,le,windY2,and,windY2,le,windY1 + windH
	bool = bool + 1
*ENDIF
*IF,bool,ge,2,cycle
!!!!
!!!! Corner x2+w, y2
bool = 0
*IF,windX1,le,windX2+windW,and,windX2+windW, le, windX1 + windW
	bool = bool + 1
*ENDIF
*IF, windY1,le,windY2,and,windY2,le,windY1 + windH
	bool = bool + 1
*ENDIF
*IF,bool,ge,2,cycle
!!!!
!!!! Corner x2, y2 + h
bool = 0
*IF,windX1,le,windX2,and,windX2, le, windX1 + windW
	bool = bool + 1
*ENDIF
*IF, windY1,le,windY2+windH,and,windY2+windH,le,windY1 + windH
	bool = bool + 1
*ENDIF
*IF,bool,ge,2,cycle
!!!!
!!!! Corner x2 + w, y2 + h
bool = 0
*IF,windX1,le,windX2+windW,and,windX2 + windW, le, windX1 + windW
	bool = bool + 1
*ENDIF
*IF, windY1,le,windY2+windH,and,windY2+windH,le,windY1 + windH
	bool = bool + 1
*ENDIF
*IF,bool,ge,2,cycle
!--------------------------------------------------------

n = n + 1

/prep7

!-----------------
! Saving initial Param
!-----------------
c(n,1) = door
c(n,2) = windX1
c(n,3) = windY1
c(n,4) = windX2
c(n,5) = windY2


!-----------------
!Create House
!-----------------
!House
BLC4,xStart, yStart, width, height
!Door
BLC4,door,yStart, doorW, doorH
!Window
BLC4,windX1+windMargin,windY1+windMargin,windW,windH
!2nd Window
BLC4,windX2+windMargin,windY2+windMargin,windW,windH

!Selecting and deleting the area of Door and the two windows
FLST,3,3,5,ORDE,2
FITEM,3,2
FITEM,3,-4
ASBA,       1,P51X


!-----------------
! Material
!-----------------
ET,1,PLANE182
KEYOPT,1,1,0
KEYOPT,1,3,3
KEYOPT,1,6,0

r,1,0.2

mp,ex,1,30000000
mp,prxy,1,0.2

dl,17,,all
dl,18,,all
sfl,3,pres,25000000

!-----------------
! Mesh
!-----------------
esize,meshsize
amesh,all
cpintf,all

!/OUTPUT,data,txt,APPEND
/solu
solve

/post1

!-----------------
! Value at point 4,4
!-----------------
!!!!!!!!!!!!!!!!!!!!!!!!!!!!!!!!!!
! T O   D O !!!!!!!!!!!!!!!!!!!!!!
!!!!!!!!!!!!!!!!!!!!!!!!!!!!!!!!!!
!Checken ob wir wirklich die Lösung bekommen die wir wollen
! maximale Verschiebung bei 4,4
allsel
seltol,meshsize
nsel,s,loc,x,4 !select nodes with x coordinate
nsel,r,loc,y,4 !reselect with y coordinate


*get,UY44,NODE,NDNEXT(0),U,Y !NDNEXT is ugly
*get,UX44,NODE,NDNEXT(0),U,X
*get,SX44,NODE,NDNEXT(0),S,X
*get,SY44,NODE,NDNEXT(0),S,Y
*get,SXY44,NODE,NDNEXT(0),S,XY
c(n,6) = UX44
c(n,7) = UY44
c(n,8) = SX44
c(n,9) = SY44
c(n,10) = SXY44


*enddo


!!! Writes out Matrix to matlab
*dmat, exportmatrix, D, import, APDL, c ! export to matrix file
*export, exportmatrix, mmf, mytemp.mtx
